<Node name="root" dt="0.0001" gravity="0 0 0" >
    <RequiredPlugin name='SofaBoundaryCondition'/>
    <RequiredPlugin name='SofaTopologyMapping'/>
    <RequiredPlugin name='SofaLoader'/>
    <RequiredPlugin name='SofaImplicitOdeSolver'/>
    <RequiredPlugin name='SofaBaseLinearSolver'/>
    <RequiredPlugin name='SofaBaseTopology'/>
    <RequiredPlugin name="SofaBaseVisual" />
    <RequiredPlugin name="SofaBaseMechanics" />
    <RequiredPlugin name="SofaBaseLinearSolver" />
    <RequiredPlugin name="SofaEngine" />
    <RequiredPlugin name="SofaMeshCollision" />

    <VisualStyle displayFlags="showBehaviorModels"/>
    <DefaultAnimationLoop />
    <DefaultVisualManagerLoop />

    <MeshOBJLoader name="temperatureLoader" filename="beamTemperatures.obj" />
    <RegularGridTopology name="grid" n="21 11 11"  p0="0 0 0" min="0 0 0" max="1 0.5 0.5" drawHexahedra="1" tags="geom"/>
    <MechanicalObject template="Vec3d"  name="gridDOFs" tags="geom" />
    <BoxROI name="box-dirac" box="-0.01 -0.01 -0.01 0.01 0.51 0.51" drawBoxes="1" position="@gridDOFs.position"/>
    <BoxROI name="box-fixed" box="0.99 -0.01 -0.01 1.01 0.51 0.51" drawBoxes="1" position="@gridDOFs.position"/>

    <Node name="Tetra" gravity="0 0 0" >
        <TetrahedronSetTopologyContainer name="Container" tags="meca"/>
        <TetrahedronSetTopologyModifier name="Modifier" tags="meca"/>
        <TetrahedronSetGeometryAlgorithms template="Vec3d" name="GeomAlgo"  tags="meca"/>
        <Hexa2TetraTopologicalMapping name="default28" swapping="0" tags="meca"/>
        <TriangleCollisionModel name="collisionmodel" />

        <Node name="Temperature" gravity="0 0 0"  >
            <EulerImplicitSolver name="EulerExplicitSolver" firstOrder="1" tags="heat" rayleighStiffness="0.1" rayleighMass="0.1" />
            <CGLinearSolver name="CG" iterations="1000" tolerance="1.0e-10" threshold="1.0e-30" tags="heat" />
            <MechanicalObject template="Vec1d" position="@../../temperatureLoader.position"  name="gridTemperature" bbox="0 0 0 0 0 0" tags="heat" />
            <TetrahedronDiffusionFEMForceField template="Vec1d" name="DiffusionForceField" constantDiffusionCoefficient="1.0" tagMechanics="geom" tags="heat" topology="@../Container"/>
            <MeshMatrixMass lumping="1" template="Vec1d,Vec3d" name="Mass" massDensity="1.0" tags="heat" topology="@../Container" geometryState="@../../gridDOFs" />
            <LinearMovementConstraint template="Vec1d" keyTimes="0 998 999" movements="1 1 0" indices="@../../box-dirac.indices" />
            <FixedConstraint indices="@../../box-fixed.indices" />
        </Node>
    </Node>
</Node>
