<?xml version="1.0"?>
<Node 	name="Root" gravity="0 -1 0" time="0" animate="0"   >
<VisualStyle displayFlags="hideVisualModels showBehaviorModels showMappings showForceFields" />
<Node 	name="Create here an example of the plugin" >
    <MechanicalObject template="Vec3" position="0 0 0   0 -1 0" />
    <UniformMass />
    <Node>
        <MechanicalObject template="Vec1" />
        <ExtensionMapping links="0 1" />
        <UniformCompliance compliance="1.0" />
    </Node>
</Node>
</Node>
