import Sofa


from Compliant import Rigid, Frame

def createScene(root):

    # root node setup
    root.createObject('RequiredPlugin', pluginName = 'Compliant')
    root.createObject('VisualStyle', displayFlags="showBehavior" )

    # simuation parameters
    root.dt = 1e-2
    root.gravity = [0, -9.8, 0]

    # ode solver
    ode = root.createObject('CompliantImplicitSolver')
    ode.stabilization = "pre-stabilization"

    # numerical solver
    num = root.createObject('MinresSolver')
    num.iterations = 500

    # scene node
    scene = root.createChild('scene')

    # script variables
    n = 10
    length = 2

    # objects creation
    obj = []

    for i in xrange(n):
	# rigid bodies
        body = Rigid.Body()
        body.name = 'link-' + str(i)
        body.dofs.translation = [0, length * i, 0]

        body.inertia_forces = 'true'

        obj.append( body )
        # insert the object into the scene node, saves the created
        # node in body_node
        body.node = body.insert( scene )
        body.node.getObject("dofs").showObject=True

    # joints creation
    for i in xrange( n-1 ):
	# the joint
        j = Rigid.SphericalJoint()

        # joint offset definitions
        up = Rigid.Frame.Frame()
        up.translation = [0, length /2 , 0]

        down = Rigid.Frame.Frame()
        down.translation = [0, -length /2 , 0]

        # append node/offset to the joint
        j.append( obj[i].node, up ) # parent
        j.append( obj[i+1].node, down) # child

        j.insert(scene)

    # attach first node
    obj[0].node.createObject('FixedConstraint', indices='0')

    # and wheee !
