<?xml version="1.0"?>
<Node 	name="Root" gravity="0 0 0 " dt="1"  >
    <VisualStyle displayFlags="hideWireframe showBehaviorModels" />
    <DefaultAnimationLoop />
    <DefaultVisualManagerLoop />

  <Node name="hexaFEM"  >
    <VisualStyle displayFlags="showWireframe hideBehaviorModels" />
    <EulerImplicitSolver />
    <CGLinearSolver iterations="200" tolerance="1e-15" threshold="1e-15"/>


       <MechanicalObject template="Vec3d" name="Triangles"   />
       <RegularGrid
                   n="5 5 21"
                   min="-0.2 -0.2  -1"
                   max=" 0.2  0.2   1"/>


        <BoxROI template="Vec3d" box="-1 -1 -1.1 1 1 -0.99" />
       <ConstantForceField template="Vec3d" points="@[-1].indices" totalForce="0 0 -0.05"/>

       <BoxROI template="Vec3d" box="-1 -1 0.99 1 1 1.1 "  drawBoxes="0" />
       <ConstantForceField template="Vec3d" points="@[-1].indices" totalForce="0 0 0.05"/>


	<UniformMass totalMass="10" />

	<HexahedronFEMForceField youngModulus="1.0" poissonRatio="0" method="polar" updateStiffnessMatrix="false" />

	<Node name="Visual"  >
	     <VisualModel  fileMesh="beam.obj"  color="blue" />
	     <BarycentricMapping input="@.." output="@." />
	</Node>
  </Node>

  <Node name="tetFEM">
    <VisualStyle displayFlags="showWireframe hideBehaviorModels" />
    <EulerImplicitSolver />
    <CGLinearSolver iterations="200" tolerance="1e-15" threshold="1e-15"/>

       <MechanicalObject template="Vec3d" name="Triangles"   />
       <RegularGrid
                   n="5 5 21"
                   min="-0.2 -0.2  -1"
                   max=" 0.2  0.2   1"/>
       <TriangleSetTopologyModifier name="Modifier" />
       <TriangleSetTopologyAlgorithms template="Vec3d" name="TopoAlgo" />
       <TriangleSetGeometryAlgorithms template="Vec3d" name="GeomAlgo" />
       <TriangleModel name="CollisionModel" />

	<UniformMass totalMass="10" />

      	<TetrahedronFEMForceField method="polar"  youngModulus="1"  poissonRatio="0"  />

        <BoxROI template="Vec3d" box="-1 -1 -1.1 1 1 -0.99" />
       <ConstantForceField template="Vec3d" points="@[-1].indices" totalForce="0 0 -0.05"/>

       <BoxROI template="Vec3d" box="-1 -1 0.99 1 1 1.1 "  />
       <ConstantForceField template="Vec3d" points="@[-1].indices" totalForce="0 0 0.05"/>


       <Node 	name="VisualNode">
            <OglModel template="ExtVec3f" name="Visual" color="red" />
            <IdentityMapping template="Mapping&lt;Vec3d,ExtVec3f&gt;" name="default1"  object1="../../Triangles"  object2="../Visual" />
       </Node>
  </Node>


    <Node 	name="Flexible"   >
        <EulerImplicitSolver />
        <CGLinearSolver iterations="200" tolerance="1e-15" threshold="1e-15"/>

        <MeshObjLoader name="mesh" filename="beam.obj" triangulate="1"/>
        <ImageContainer template="ImageUC" name="image" filename="beam.raw" drawBB="false"/>
        <ImageSampler template="ImageUC" name="sampler" src="@image" method="1" param="0" fixedPosition="0 0 -0.999 0 0 0.999" printLog="false"/>
        <MergeMeshes name="merged" nbMeshes="2" position1="@sampler.fixedPosition"  position2="@sampler.position" />
	<MechanicalObject template="Quadratic" name="parent" useMask="0" showObject="true" src="@merged" />
	<VoronoiShapeFunction name="SF" position="@parent.rest_position" src="@image" useDijkstra="true" method="0" nbRef="4"/>

	<Node 	name="behavior"   >
	    <ImageGaussPointSampler name="sampler" indices="@../SF.indices" weights="@../SF.weights" transform="@../SF.transform" method="2" order="4" showSamplesScale="0" printLog="false" targetNumber="100"/>
            <MechanicalObject template="F332" name="F" />
	    <LinearMapping template="Mapping&lt;Quadratic,F332&gt;"  />

	    <Node 	name="E"   >
		<MechanicalObject  template="E332" name="E"  />
		<CorotationalStrainMapping template="Mapping&lt;F332,E332&gt;"   method="polar" />
		<HookeForceField  template="E332" name="ff" youngModulus="1" poissonRatio="0" viscosity="0"/>
	    </Node>
        </Node>

	<Node 	name="mass"   >
	     <MechanicalObject position="@../behavior/sampler.position"  />

	     <LinearMapping template="Mapping&lt;Quadratic,Vec3d&gt;"  />
        </Node>

	    <Node 	name="collision"   >
		<Mesh name="mesh" src="@../mesh" />
		<MechanicalObject  template="Vec3d" name="pts"  useMask="0"  />
		<UniformMass totalMass="10" />

       		 <BoxROI template="Vec3d" box="-1 -1 -1.1 1 1 -0.99" />
      		 <ConstantForceField template="Vec3d" points="@[-1].indices" totalForce="0 0 -0.05"/>

      		 <BoxROI template="Vec3d" box="-1 -1 0.99 1 1 1.1 "  />
       		<ConstantForceField template="Vec3d" points="@[-1].indices" totalForce="0 0 0.05"/>

	    	<LinearMapping template="MechanicalMapping&lt;Quadratic,Vec3d&gt;"/>
	    </Node>

	    <Node 	name="visual"   >
		<OglModel template="ExtVec3f" name="Visual" fileMesh="beam.obj" color="1 0.8 0.8 "/>
	    	<LinearMapping template="MechanicalMapping&lt;Quadratic,ExtVec3f&gt;"/>
	    </Node>
    </Node>
</Node>
