<?xml version="1.0"?>

<Node 	name="Root" gravity="0 0 0" time="0" animate="0"  dt="1" showAxis="true">
  <RequiredPlugin pluginName="Flexible"/>

    <!--Solver-->
    <EulerImplicitSolver name="cg_odesolver" printLog="0" />
    <CGLinearSolver template="GraphScattered" name="linear solver" iterations="25" tolerance="1e-12" threshold="1e-12" />

    <!--Topology Hexahedra-->
    <RegularGridTopology name="hexahedra" n="2 5 5" min="0 0 0" max="1 1 1"  />

    <!--MechanicalObject-->
    <MechanicalObject name="DOFs" template="Vec3d"  showObject="1"  showObjectScale="5"  showIndices="1"  showIndicesScale="0.0003" />

    <!--MeshMatrixMass-->
    <UniformMass totalMass="1" />

    <!--maintain point (0,0,0) fixed -->
    <BoxROI template="Vec3d" name="O_box_roi" box="-0.01 -0.01 -0.01   0.01 0.01 0.01  "  drawPoints="1" drawSize="30" />
    <ProjectToPointConstraint point="0 0 0" indices="@[-1].indices" />

    <!--constrain point (0,1,0) to the y axis -->
    <BoxROI template="Vec3d" name="Oy_line_box_roi" box="-0.01 0.99 -0.01   0.01 1.01 0.01  "  drawPoints="1" drawSize="30" />
    <ProjectToLineConstraint origin="0 0 0" direction="0 1 0" indices="@[-1].indices" />

    <!--constraint face x=0 to stay in this plane-->
    <BoxROI template="Vec3d" name="Oyz_plane_box_roi" box="-0.01 -0.01 -0.01   0.01 1.01 1.01  " drawBoxes="1" drawSize="1" />
    <ProjectToPlaneConstraint normal="1 0 0" indices="@[-1].indices" />

    <BarycentricShapeFunction template="ShapeFunctiond" />

    <!--Decomposition of the cubes in tetrahedra, with tetrahedral FEM -->
    <Node name="Tetra" >
      <TetrahedronSetTopologyContainer name="TetraContainer" />
      <TetrahedronSetTopologyModifier />
      <TetrahedronSetTopologyAlgorithms template="Vec3d" />
      <TetrahedronSetGeometryAlgorithms template="Vec3d" />
      <Hexa2TetraTopologicalMapping name="default28" input="@hexahedra" output="@TetraContainer" />

       <!--Quads-->
      <QuadSetTopologyContainer name="QuadContainer" />
      <QuadSetTopologyModifier />
      <QuadSetTopologyAlgorithms template="Vec3d" />
      <QuadSetGeometryAlgorithms template="Vec3d" />
      <Hexa2QuadTopologicalMapping name="default28" input="@hexahedra" output="@QuadContainer" />
      <QuadPressureForceField normal="1 0 0" dmin="0.99" dmax="1.01" showForces="1" pressure="0.2 0 0"/>

      <Node name="behavior"   >
        <TopologyGaussPointSampler name="sampler" inPosition="@../../hexahedra.position" showSamplesScale="0" method="0" order="1" />
        <MechanicalObject  template="F332" name="F"  showObject="0" showObjectScale="0.05" />
        <LinearMapping template="Mapping&lt;Vec3d,F332&gt;" showDeformationGradientScale="0.05"  showDeformationGradientStyle="0 - All axis"  showColorOnTopology="2 - sqrt(det(F^T.F))-1"  />

         <!--Material-->
         <Node name="Strain"   >
            <MechanicalObject  template="E332" name="E"  />
            <CorotationalStrainMapping template="Mapping&lt;F332,E332&gt;"   method="svd" geometricStiffness="true"/>
            <HookeForceField  template="E332" name="ff" youngModulus="1" poissonRatio="0.1" viscosity="0.1"/>
        </Node>

      </Node>

    </Node>

</Node>
