<?xml version="1.0"?>
<Node 	name="Root" gravity="0 0 0" dt="0.01"  >
    <RequiredPlugin pluginName="Flexible"/>
    <VisualStyle displayFlags="showBehaviorModels showMechanicalMappings showForceFields" />

    <EulerExplicitSolver />
    <Node 	name="Flexible"   >
    	<MeshTopology name="mesh" position="0 0 1   0 1 0   1 0 0   -1 -1 0  2 2 2 " tetrahedra="0 1 2 3 0 1 2 4" />
    	<MechanicalObject  name="parent" src="@mesh"  />
    	<UniformMass mass="1" />
<!--    <ShepardShapeFunction position="@parent.rest_position" power="2"/> -->
    	<BarycentricShapeFunction />
	   <ConstantForceField indices="0" force="0 0 1000 " />
	   <FixedConstraint indices="1 2 3 4" />


	    <Node 	name="behavior"   >
		<TopologyGaussPointSampler name="sampler" inPosition="@../parent.rest_position" showSamplesScale="1"/>
		<MechanicalObject  template="F331" name="F"  showObject="0" showObjectScale="0.05" />
	    	<LinearMapping template="Vec3d,F331"  />

		<Node 	name="Strain"   >
		    <MechanicalObject  template="E331" name="E"  />
		    <GreenStrainMapping template="F331,E331" />
		    <HookeForceField  template="E331" name="ff" youngModulus="1000" poissonRatio="0" viscosity="0"/>
		</Node>
	    </Node>
    </Node>
<!--
    <Node 	name="Child"   >
        <MechanicalObject template="Vec3d" position="0 0.1 0.8   0 0 0.5" name="child"/>
    	<LinearMapping template="Vec3d,Vec3d"/>
    </Node>
 -->

    <Node 	name="FEM"   >
    	<MeshTopology name="mesh" position="0 0 1   0 1 0   1 0 0   -1 -1 0  2 2 2 " tetrahedra="0 1 2 3 0 1 2 4" />
    	<MechanicalObject  name="parent" src="@mesh"  />
    	<UniformMass mass="1" />
	   <ConstantForceField indices="0" force="0 0 1000" />
	   <FixedConstraint indices="1 2 3 4" />


<!--	    <TetrahedralCorotationalFEMForceField name="ff" youngModulus="1000" poissonRatio="0" method="polar"/> -->
	    <StandardTetrahedralFEMForceField name="ff" materialName="StVenantKirchhoff" ParameterSet="500 0" />
<!--	    <TetrahedronFEMForceField name="ff" youngModulus="200" poissonRatio="0" method="small"/>  -->


    </Node>

</Node>
