<Node name="root" dt="0.05" showBehaviorModels="1" showCollisionModels="1" showMappings="0" showForceFields="1" showBoundingTree="0" gravity="0 0 0">
	<CollisionPipeline verbose="0" name="CollisionPipeline"/>
	<BruteForceDetection name="N2" />
	<CollisionResponse response="default" name="collision response"/>
	<Node name="TetraTopology1">
		<EulerImplicit name="cg_odesolver" printLog="false"/>
		<CGLinearSolver iterations="25" name="linear solver" tolerance="1.0e-9" threshold="1.0e-9" />
		<ManifoldTetrahedronSetTopologyContainer name="Container1" fileTopology="mesh/liver.msh" />
		<TetrahedronSetTopologyModifier/>
		<TetrahedronSetTopologyAlgorithms template="Vec3d" />
		<TetrahedronSetGeometryAlgorithms template="Vec3d" />
		<MechanicalObject name="dofs" />
                <FixedConstraint name="FixedConstraint" indices="3 39 64" />
		<DiagonalMass massDensity="1" name="computed using mass density"/>
		<TetrahedralCorotationalFEMForceField name="FEM" youngModulus="500" poissonRatio="0.3" computeGlobalMatrix="false" method="large"/>
		<Node name="TetraTopology2">
			<ManifoldTetrahedronSetTopologyContainer name="Container2"/>
			<TetrahedronSetTopologyModifier/>
			<TetrahedronSetTopologyAlgorithms template="Vec3d" />
			<TetrahedronSetGeometryAlgorithms template="Vec3d" />
			<SimpleTesselatedTetraTopologicalMapping object1="Container1" object2="Container2"/>
			<MechanicalObject/>
			<SimpleTesselatedTetraMechanicalMapping/>
			<Triangle />
		</Node>
	</Node>
</Node>
