<Node name="root" dt="0.01">
    <RequiredPlugin name="SofaOpenglVisual"/>
    <RequiredPlugin pluginName="SofaStereo"/>
    <StereoCamera enabled="true" mode="3" strategy="0" baseline="10" />

    <OglModel name="visual" fileMesh="mesh/dragon.obj" />
</Node>
