<?xml version="1.0"?>
<Node 	name="root" gravity="0 0 0" dt=".1"  >

<RequiredPlugin name="Flexible" pluginName="Flexible" />
<RequiredPlugin name="Image" pluginName="image" />

    <EulerImplicitSolver />
    <CGLinearSolver iterations="25"/>

  <VisualStyle displayFlags="showWireframe showVisual showBehaviorModels" />
  <MeshObjLoader name="mesh" filename="mesh/Armadillo_simplified.obj" triangulate="1"/>
  <MeshToImageEngine  name="rasterizer" src="@mesh" voxelSize="0.5" padSize="2" rotateImage="true" />
  <ImageContainer template="ImageB" name="image" src="@rasterizer" drawBB="false"/>
  <!-- <ImageViewer template="ImageB" name="viewer" src="@image" /> -->

	    <ImageSampler template="ImageB" name="sampler" src="@image" method="1" param="10" />
	    <MechanicalObject template="Affine" name="parent" useMask="0" showObject="true" showObjectScale="1" src="@sampler" />
	    <VoronoiShapeFunction template="ShapeFunction3d,ImageB" name="SF" position="@parent.rest_position" src="@image" />

	    <Node 	name="behavior"   >
		<ImageGaussPointSampler name="sampler" indices="@../SF.indices" weights="@../SF.weights" transform="@../SF.transform" method="2" order="1" targetNumber="100" />
		<MechanicalObject template="F331" />
	    	<LinearMapping template="Mapping&lt;Affine,F331&gt;" />

		<Node 	name="E"   >
		    <MechanicalObject  template="E331" />
		    <CorotationalStrainMapping template="Mapping&lt;F331,E331&gt;" />
		    <HookeForceField  template="E331" youngModulus="1000.0" poissonRatio="0" viscosity="0"/>
		</Node>
	    </Node>

	    <Node 	name="mass"   >
		<MechanicalObject  src="@../behavior/sampler"  />
		<UniformMass totalMass="250" />
	    	<LinearMapping template="MechanicalMapping&lt;Affine,Vec3d&gt;"/>
	    </Node>

	    <Node 	name="collision"   >
		<MeshObjLoader name="MeshLoader" filename="mesh/Armadillo_simplified.obj" />
		<Mesh src="@MeshLoader" />
		<MechanicalObject useMask="1" />
	    	<LinearMapping template="MechanicalMapping&lt;Affine,Vec3d&gt;"/>
	    </Node>

	    <Node 	name="visual"   >
		<OglModel template="ExtVec3f" name="Visual" fileMesh="mesh/Armadillo_simplified.obj" color="1 0.8 0.8 "/>
	    	<LinearMapping template="MechanicalMapping&lt;Affine,ExtVec3f&gt;"/>
	    </Node>
    </Node>

</Node>
