<?xml version="1.0"?>
<Node name="root" gravity="0 0 0" dt=".1"  >
  <RequiredPlugin pluginName="image"/>

  <VisualStyle displayFlags="showVisual showBehaviorModels" />
  <MeshObjLoader name="mesh1" filename="mesh/bubille_in1.obj" triangulate="1"/>
  <MeshObjLoader name="mesh2" filename="mesh/bubille_in2.obj" triangulate="1"/>
  <MeshObjLoader name="mesh3" filename="mesh/bubille_out.obj" triangulate="1"/>


  <Node name="Voxelizing several meshes in one image (the prefered solution in most cases)" >


    <!-- First, rasterize outside and 1 ball with multiple values -->
    <MeshToImageEngine template="ImageD" name="rasterizer"  nbMeshes="3"
		       closingValue="10"
                       value="0.6785495351 0.72176664 0.2358868495 0.7430070741 0.3192342278 0.7154783425 0.2718139729 0.6173636876 0.2299708673 0.672005909 0.3633306473 0.7020061249 0.5216139178 0.6472131857 0.3975833338 0.4226887743 0.5727392146 0.9566237102 0.8555261833 0.4275386017 0.7198202829 0.4009340731 0.9797545508 0.6385396258 0.4768794323 0.0640451512 0.978210899 0.837158605 0.551828166 0.5539513445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" position="@../mesh3.position" triangles="@../mesh3.triangles"
		       value2="0.5" position2="@../mesh2.position" triangles2="@../mesh2.triangles" fillInside2="true"
                       value3="1" position3="@../mesh1.position" triangles3="@../mesh1.triangles" fillInside3="true"
		       voxelSize="0.2 0.2 0.2" padSize="2" rotateImage="false" printLog="true" />


    <!-- Then diffuse weights inside the meshes -->
    <ImageFilter template="ImageD,ImageD" name="diffusion" inputImage="@rasterizer.image" inputTransform="@rasterizer.transform" filter="23"  param="10000 1 1 1e-7" printLog="true"/>

    <ImageContainer template="ImageD" name="image" inputImage="@diffusion.outputImage" inputTransform="@diffusion.outputTransform" drawBB="false"/>

    <ImageViewer template="ImageD" name="viewer" src="@image" />


    <Node name="Visu">
        <VisualModel name="Gelatin" fileMesh="mesh/bubille_8x8x16.obj" color="0.1 .8 .3 .05" />
<!--         <VisualModel name="Ball1" fileMesh="mesh/bubille_in1.obj" color="1 0 0 .2" /> -->
<!--         <VisualModel name="Ball2" fileMesh="mesh/bubille_in2.obj" color="0 0 1 .2" /> -->
    </Node>

  </Node>

</Node>
