<?xml version="1.0"?>
<Node 	name="root" gravity="0 0 0" dt="1"  >
    <RequiredPlugin name="SofaOpenglVisual"/>
  <RequiredPlugin pluginName="image"/>
  <VisualStyle displayFlags="showVisual" />

  <MeshObjLoader name="mesh" filename="mesh/Armadillo_simplified.obj" triangulate="1"/>
  <MeshToImageEngine  name="rasterizer" src="@mesh" voxelSize="1.5" padSize="1" rotateImage="true" />
  <ImageContainer template="ImageB" name="image" src="@rasterizer" />
  <ImageViewer template="ImageB" name="viewer" src="@image"  />
  <ImageSampler template="ImageB" name="sampler" src="@image" param="1" showEdges="true" printLog="true"/>

  <Node name="simu"  >
	  <EulerImplicitSolver rayleighMass="1" rayleighStiffness="0.03" />
	  <CGLinearSolver />
	  <Mesh  src="@../sampler" />
	  <MechanicalObject  />
          <UniformMass totalMass="1000.0" />

          <HexahedronFEMForceField youngModulus="30.0" poissonRatio="0.3" method="large" updateStiffnessMatrix="false" />

	  <Node name="Visual"  >
	     <OglModel  fileMesh="mesh/Armadillo_simplified.obj"   />
	     <BarycentricMapping input="@.." output="@." />
	  </Node>
  </Node>

</Node>
