import SofaPython.Tools
import image.StructuralAPI

def createScene(rootNode):
    rootNode.createObject("RequiredPlugin", name="image")
    im = image.StructuralAPI.Image(rootNode,"armadillo")
    im.addMeshLoader("mesh/Armadillo_simplified.obj")
    im.addImage(0.5, 1)
    im.addViewer()
    im.addExporter("armadillo.mhd")
    rootNode.createObject("OglModel", name="visu",  src="@"+SofaPython.Tools.getObjectPath(im.mesh), color="0.5 0.5 1 .5")

    im2 = image.StructuralAPI.Image(rootNode,"armadillo2")
    im2.addReader("armadillo.mhd")
    im2.addViewer()
