<?xml version="1.0" ?>
<!-- Automatic Triangle removal on a simple Triangle topology with FEM: Element removed are define in: ./RemovingTrianglesProcess.txt -->
<Node name="root" gravity="0 -9 0" dt="0.01">
    <RequiredPlugin name="SofaOpenglVisual"/>
    <RequiredPlugin name="SofaMiscFem"/>
    <RequiredPlugin name="SofaMiscTopology"/>
    <RequiredPlugin name="SofaImplicitOdeSolver"/>
    <RequiredPlugin name="SofaGeneralSimpleFem"/>
    <RequiredPlugin name="SofaGeneralDeformable"/>
    <RequiredPlugin name="SofaBoundaryCondition"/>
    <RequiredPlugin name="SofaMeshCollision"/>

    <VisualStyle displayFlags="showVisual showBehaviorModels" />
    <DefaultPipeline verbose="0" />
    <BruteForceBroadPhase name="N2" />
    <BVHNarrowPhase />
    <DefaultContactManager response="PenalityContactForceField" />
    <MinProximityIntersection name="Proximity" alarmDistance="0.8" contactDistance="0.5" />
    <Node name="SquareGravity">
        <EulerImplicitSolver name="cg_odesolver" rayleighStiffness="0.1" rayleighMass="0.1" />
        <CGLinearSolver iterations="25" tolerance="1e-5" threshold="1e-5" name="linear solver"/>
        <MeshGmshLoader name="loader" filename="mesh/square3.msh" createSubelements="true" />
        <MechanicalObject name="dofs" src="@loader" template="Vec3d" />
        <TriangleSetTopologyContainer name="Triangle_topo" src="@loader"/>
        <TriangleSetTopologyModifier name="Modifier" />
        <TriangleSetGeometryAlgorithms template="Vec3d" name="GeomAlgo" drawTriangles="1"/>
        <DiagonalMass template="Vec3d,double" name="mass" massDensity="1.0" />
        <FixedConstraint template="Vec3d" name="fix" indices="0 1 2 3 4 5 6 7 8 9 10 11 12 13 14 15 16 17 18 19 20 21 22 23 24 25 26 27 28 29 30" />

        <TopologicalChangeProcessor listening="1" filename="RemovingTrianglesProcess_constraint.txt" />
    </Node>
</Node>
