<Node name="root" gravity="-1.8 0 100" dt="0.01">

    <Node name="plugins">
        <RequiredPlugin pluginName="Sofa.Component.Constraint.Projective"/> <!-- Needed to use components [FixedProjectiveConstraint] -->
        <RequiredPlugin pluginName="Sofa.Component.Engine.Select"/> <!-- Needed to use components [BoxROI] -->
        <RequiredPlugin pluginName="Sofa.Component.IO.Mesh"/> <!-- Needed to use components [MeshGmshLoader MeshOBJLoader] -->
        <RequiredPlugin pluginName="Sofa.Component.LinearSolver.Direct"/> <!-- Needed to use components [AsyncSparseLDLSolver] -->
        <RequiredPlugin pluginName="Sofa.Component.LinearSolver.Iterative"/> <!-- Needed to use components [PCGLinearSolver] -->
        <RequiredPlugin pluginName="Sofa.Component.LinearSystem"/> <!-- Needed to use components [ConstantSparsityPatternSystem] -->
        <RequiredPlugin pluginName="Sofa.Component.Mapping.Linear"/> <!-- Needed to use components [BarycentricMapping] -->
        <RequiredPlugin pluginName="Sofa.Component.Mass"/> <!-- Needed to use components [MeshMatrixMass] -->
        <RequiredPlugin pluginName="Sofa.Component.ODESolver.Backward"/> <!-- Needed to use components [BDFOdeSolver NewtonRaphsonSolver] -->
        <RequiredPlugin pluginName="Sofa.Component.SolidMechanics.FEM.HyperElastic"/> <!-- Needed to use components [TetrahedronHyperelasticityFEMForceField] -->
        <RequiredPlugin pluginName="Sofa.Component.StateContainer"/> <!-- Needed to use components [MechanicalObject] -->
        <RequiredPlugin pluginName="Sofa.Component.Topology.Container.Dynamic"/> <!-- Needed to use components [TetrahedronSetGeometryAlgorithms TetrahedronSetTopologyContainer] -->
        <RequiredPlugin pluginName="Sofa.Component.Visual"/> <!-- Needed to use components [VisualStyle] -->
        <RequiredPlugin pluginName="Sofa.GL.Component.Rendering3D"/> <!-- Needed to use components [OglModel] -->
    </Node>

    <VisualStyle displayFlags="showWireframe showVisual showBehaviorModels hideForceFields" />
    <DefaultAnimationLoop parallelODESolving="false"/>

    <Node name="DeformableObject">

        <BDFOdeSolver order="2" printLog="false" rayleighMass="0.01" rayleighStiffness="0.01"/>
        <NewtonRaphsonSolver name="newton" printLog="false"
                             maxNbIterationsNewton="10" absoluteResidualStoppingThreshold="1e-5"
                             maxNbIterationsLineSearch="5" lineSearchCoefficient="0.5"
                             relativeInitialStoppingThreshold="1e-3"
                             absoluteEstimateDifferenceThreshold="1e-5"
                             relativeEstimateDifferenceThreshold="1e-5"/>
        <ConstantSparsityPatternSystem template="CompressedRowSparseMatrix" name="A" checkIndices="false"/>
        <PCGLinearSolver name="PCG" iterations="1000" preconditioner="@preconditioner" printLog="true"/>
        <AsyncSparseLDLSolver name="preconditioner" template="CompressedRowSparseMatrix"/>

        <MeshGmshLoader name="loader" filename="mesh/truthcylinder1.msh" />
        <TetrahedronSetTopologyContainer src="@loader" name="topologyContainer"/>
        <TetrahedronSetGeometryAlgorithms name="geomAlgo"/>
        <MechanicalObject src="@loader" />
        <MeshMatrixMass totalMass="15" topology="@topologyContainer"/>

        <BoxROI name="box" box="-10 -20 -10  10 -17.5 10" drawBoxes="true"/>
        <FixedProjectiveConstraint indices="@box.indices" />
        <TetrahedronHyperelasticityFEMForceField name="FEM" ParameterSet="3448.2759 31034.483" materialName="StVenantKirchhoff"/>

        <Node name="visual">
            <MeshOBJLoader name="meshLoader_0" filename="mesh/truthcylinder1.obj" handleSeams="1" />
            <OglModel name="Visual" src="@meshLoader_0" color="red" />
            <BarycentricMapping input="@.." output="@Visual" />
        </Node>
    </Node>

</Node>
