<?xml version="1.0" ?>
<Node name="root" dt="0.05" showBoundingTree="0" gravity="0 0 0">
    <RequiredPlugin name="Sofa.Component.Collision.Detection.Algorithm"/> <!-- Needed to use components [BVHNarrowPhase BruteForceBroadPhase CollisionPipeline] -->
    <RequiredPlugin name="Sofa.Component.Collision.Detection.Intersection"/> <!-- Needed to use components [DiscreteIntersection] -->
    <RequiredPlugin name="Sofa.Component.Collision.Geometry"/> <!-- Needed to use components [TriangleCollisionModel] -->
    <RequiredPlugin name="Sofa.Component.Collision.Response.Contact"/> <!-- Needed to use components [CollisionResponse] -->
    <RequiredPlugin name="Sofa.Component.Constraint.Projective"/> <!-- Needed to use components [FixedProjectiveConstraint] -->
    <RequiredPlugin name="Sofa.Component.Engine.Select"/> <!-- Needed to use components [BoxROI] -->
    <RequiredPlugin name="Sofa.Component.IO.Mesh"/> <!-- Needed to use components [MeshOBJLoader] -->
    <RequiredPlugin name="Sofa.Component.LinearSolver.Iterative"/> <!-- Needed to use components [CGLinearSolver] -->
    <RequiredPlugin name="Sofa.Component.Mapping.Linear"/> <!-- Needed to use components [IdentityMapping] -->
    <RequiredPlugin name="Sofa.Component.Mass"/> <!-- Needed to use components [DiagonalMass] -->
    <RequiredPlugin name="Sofa.Component.ODESolver.Backward"/> <!-- Needed to use components [EulerImplicitSolver] -->
    <RequiredPlugin name="Sofa.Component.SolidMechanics.FEM.Elastic"/> <!-- Needed to use components [TriangularFEMForceField] -->
    <RequiredPlugin name="Sofa.Component.StateContainer"/> <!-- Needed to use components [MechanicalObject] -->
    <RequiredPlugin name="Sofa.Component.Topology.Container.Dynamic"/> <!-- Needed to use components [TriangleSetGeometryAlgorithms TriangleSetTopologyContainer TriangleSetTopologyModifier] -->
    <RequiredPlugin name="Sofa.Component.Topology.Mapping"/> <!-- Needed to use components [SubsetTopologicalMapping] -->
    <RequiredPlugin name="Sofa.Component.Visual"/> <!-- Needed to use components [VisualStyle] -->
    <VisualStyle displayFlags="showBehaviorModels showForceFields showCollisionModels showVisual" />
    <CollisionPipeline verbose="0" name="CollisionPipeline" />
    <BruteForceBroadPhase/>
    <BVHNarrowPhase/>
    <CollisionResponse response="PenalityContactForceField" name="collision response" />
    <DiscreteIntersection />
    <DefaultAnimationLoop/>

    <Node name="FullTopology">
        <MeshOBJLoader name="loader" filename="mesh/sphere_05.obj" />
        <EulerImplicitSolver name="cg_odesolver" printLog="false"  rayleighStiffness="0.1" rayleighMass="0.1" />
        <CGLinearSolver iterations="25" name="linear solver" tolerance="1.0e-9" threshold="1.0e-9" />
        <TriangleSetTopologyContainer name="Container1" src="@loader" />
        <TriangleSetTopologyModifier />
        <TriangleSetGeometryAlgorithms name="GeomAlgo" />
        <MechanicalObject name="dofs" />
        <BoxROI name="roi1" box="-55 -55 -55 55 55 -25" />
        <FixedProjectiveConstraint name="FixedProjectiveConstraint" indices="@roi1.indices" />
        <DiagonalMass massDensity="1" name="computed using mass density" />
        <TriangularFEMForceField name="FEM" youngModulus="3000" poissonRatio="0.4" />
        <Node name="SubsetTopology1">
            <BoxROI name="subsetROI" position="@../loader.position" triangles="@../loader.triangles" computeEdges="0" computeTetrahedra="0" box="-55 -55 25 55 55 55" />
            <TriangleSetTopologyContainer name="Container2" position="@../loader.position" triangles="@subsetROI.trianglesInROI" />
            <TriangleSetTopologyModifier />
            <TriangleSetGeometryAlgorithms name="GeomAlgo" />
            <SubsetTopologicalMapping input="@Container1" output="@Container2" samePoints="true" />
            <MechanicalObject />
            <IdentityMapping />
            <TriangleCollisionModel color="1 0 0 1" group="1" printLog="1" />
        </Node>
        <Node name="SubsetTopology2">
            <BoxROI name="subsetROI" position="@../loader.position" triangles="@../loader.triangles" computeEdges="0" computeTetrahedra="0" box="-55 -55 -55 55 55 25" />
            <TriangleSetTopologyContainer name="Container2" position="@../loader.position" triangles="@subsetROI.trianglesInROI" />
            <TriangleSetTopologyModifier />
            <TriangleSetGeometryAlgorithms name="GeomAlgo" />
            <SubsetTopologicalMapping input="@Container1" output="@Container2" samePoints="true" />
            <MechanicalObject />
            <IdentityMapping />
            <TriangleCollisionModel group="1" printLog="1" />
        </Node>
    </Node>
</Node>
