<?xml version="1.0"?>
<Node 	name="root" gravity="0 0 0" dt="0.05"  >
  <VisualStyle displayFlags="hideVisualModels showBehavior" />
  <Node 	name="Square"  >
    <EulerImplicitSolver name="Euler Implicit"  printLog="0"  rayleighStiffness="0.5"  rayleighMass="0.5"  vdamping="0"  verbose="0" />
    <CGLinearSolver template="GraphScattered" name="CG Solver"  printLog="0"  iterations="40"  tolerance="1e-06"  threshold="1e-10"  verbose="0" />
    <MechanicalObject template="Vec3d" name="mObject1" showIndices="true" showIndicesScale="0.0005" />
    <RegularGrid name ="loader" nx="5" ny="5" nz="1" xmin="0" xmax="1" ymin="0" ymax="1" zmin="0" zmax="1" position="@mObject1.position" drawQuads="true"/>
    <UniformMass template="Vec3d" totalmass="1"/>
    <MeshSpringForceField template="Vec3d" name="forcefield" linesStiffness="10" />
    <BoxROI name="Box" box="-0.1 -0.1 0  1.1 1.1 0"/>
    <PairBoxROI name="PairBox" inclusiveBox="-0.1 -0.1 0  1.1 1.1 0" includedBox="0.1 0.1 0 0.9 0.9 0"/>
    <BilinearMovementConstraint name="bilinearConstraint" template="Vec3d" indices="@PairBox.indices" meshIndices = "@Box.indices" constrainedPoints="@PairBox.pointsInROI" cornerMovements=" -0.3 -0.1 0
                                                                                                                                                                                              0.1 -0.3 0
                                                                                                                                                                                              1.1 0.1 0
                                                                                                                                                                                              -0.1 1.1 0"/>

  </Node>
</Node>
