<Node name="root" dt="0.02">
    <VisualStyle displayFlags="showVisual showBehaviorModels" />
    <Object type="CollisionPipeline" verbose="0" name="CollisionPipeline" />
    <Object type="BruteForceDetection" name="N2" />
    <Object type="CollisionResponse" response="default" name="collision response" />
    <Node name="Liver">
        <Object type="EulerImplicit" name="cg_odesolver" printLog="false" />
        <Object type="CGLinearSolver" iterations="25" name="linear solver" tolerance="1.0e-9" threshold="1.0e-9" />
        <Object type="MeshGmshLoader" name="loader" filename="mesh/liver.msh" />
        <Object type="Mesh" src="@loader" />
        <Object type="MechanicalObject" src="@loader" template="Vec3f" name="dofs" />
        <Object type="UniformMass" name="mass" mass="0.05" />
        <Object type="TetrahedronFEMForceField" name="FEM" youngModulus="500" poissonRatio="0.3" computeGlobalMatrix="false" method="large" />
        <Object type="FixedPlaneConstraint" direction="0 0 1" dmin="-3" dmax="1" />
        <Object type="BoxConstraint" box="-5 4.8 -.2 5 6 1" />
        <Node name="Visu">
            <Object type="OglModel" name="VisualModel" fileMesh="mesh/liver-smooth.obj" color="red" />
            <Object type="BarycentricMapping" object1="../.." object2="VisualModel" name="visual mapping" />
        </Node>
        <Node name="Surf">
            <MechanicalObject />
            <Object type="Sphere" name="CollisionModel" filename="mesh/liver.sph" />
            <Object type="BarycentricMapping" name="sphere mapping" />
        </Node>
    </Node>
</Node>
