<!-- MechanicalStateController example -->
<Node name="root" dt="0.005" gravity="0 -10 0">
    <RequiredPlugin pluginName='SofaMiscCollision'/>
    <RequiredPlugin pluginName='SofaBoundaryCondition'/>
    <RequiredPlugin pluginName='SofaConstraint'/>
    <RequiredPlugin pluginName='SofaGeneralLinearSolver'/>
    <RequiredPlugin pluginName='SofaGeneralSimpleFem'/>
    <RequiredPlugin pluginName='SofaImplicitOdeSolver'/>
    <RequiredPlugin pluginName='SofaUserInteraction'/>
    <VisualStyle displayFlags="showForceFields showCollisionModels" />
    <DefaultPipeline depth="6" verbose="0" draw="0" />
    <BruteForceDetection name="N2" />
    <LocalMinDistance name="Proximity" alarmDistance="1.0" contactDistance="0.5" />
    <DefaultContactManager name="Response" response="default" />
    <DefaultCollisionGroupManager name="Group" />
    <Node name="InstrumentEdgeSet">
        <EulerImplicitSolver rayleighStiffness="0" printLog="false"  rayleighMass="0.1" />
        <BTDLinearSolver template="BTDMatrix6d" printLog="false" verbose="false" />
        <MeshGmshLoader name="loader" filename="mesh/edgeSet.msh" />
        <MechanicalObject src="@loader" name="MechanicalDOFs" template="Rigid3d" position="0 0 0 0 0 0 1  1 0 0 0 0 0 1  2 0 0 0 0 0 1" showObject="1"/>
        <include href="Objects/EdgeSetTopology.xml" src="@loader" template="Rigid3d" />
        <MechanicalStateController template="Rigid3d" listening="true" mainDirection="-1.0 0.0 0.0" handleEventTriggersUpdate="true" />
        <FixedConstraint name="FixedConstraint" indices="0" />
        <UniformMass vertexMass="1 1 0.1 0 0 0 0.1 0 0 0 0.1" printLog="false" />

        <BeamFEMForceField name="FEM" radius="0.1" youngModulus="50000000" poissonRatio=".49"/>
    </Node>
</Node>
