<?xml version="1.0" ?>
<Node name="root" dt="0.05" showBoundingTree="0" gravity="0 -9 1">

    <RequiredPlugin pluginName='SofaGeneralEngine'/>
	<RequiredPlugin pluginName='SofaLoader'/>
    <VisualStyle displayFlags="showVisual showBehaviorModels" />

    <Node name="mesh">

		<MeshOBJLoader name="mesh1" filename="mesh/raptor_35kp.obj"/>
                <MeshOBJLoader name="mesh2" filename="mesh/snake_body.obj"/>

                <MergeVectors template="Data<double>" name="mergedPositions"  nbInputs="2" input1="@mesh1.position" input2="@mesh2.position" />
                <MechanicalObject  template="Vec3d"  position="@mergedPositions.output" showObject="True" />

    </Node>
</Node>
