<Node name="root" dt="0.05" showBehaviorModels="1" showCollisionModels="0"
	showMappings="0" showForceFields="0" showBoundingTree="0" gravity="0 -9 0" showWireFrame="1">
	<CollisionPipeline verbose="0" />
	<BruteForceDetection name="N2" />
	<CollisionResponse response="default" />
	<MinProximityIntersection name="Proximity" alarmDistance="0.8" contactDistance="0.5" />
	<CollisionGroup />

	<Node name="TT">
		<EulerImplicit name="cg_odesolver" printLog="false"/>
		<CGLinearSolver iterations="25" name="linear solver" tolerance="1.0e-9" threshold="1.0e-9" />
		<MeshLoader name="meshLoader" filename="mesh/cylinder.msh" />
		<MechanicalObject name="Volume" />
		<include href="Objects/TetrahedronSetTopology.xml" />

		<PlaneROI plane="0.3 0 0 0 0 0 0 0.3 0 0" drawBoxes="1"
			   position="@Volume.rest_position" computeTriangles="0"
			   computeTetrahedra="0" computeEdges="0" name="FixedROI"/>

        	<DiagonalMass massDensity="5" />
		<FixedConstraint indices="@FixedROI.indices" />
        	<TetrahedralCorotationalFEMForceField name="FEM"
			youngModulus="20" poissonRatio="0.4" method="large" />


		<Node name="T">
			<include href="Objects/TriangleSetTopology.xml" />
			<Tetra2TriangleTopologicalMapping object1="../../Container" object2="Container"/>

            		<TriangularFEMForceField name="FEM" youngModulus="10" poissonRatio="0.3" method="large" />
			<TriangularBendingSprings name="FEM-Bend" stiffness="300" damping="1.0"/>
			<TrianglePressureForceField normal="0 0 1" dmin="0.9" dmax="1.1" pressure="0.4 0 0"/>
			<TriangleModel/>

			<PlaneROI plane="0 0 0.5 0 0.3 1 0 0 1.5 0.2" drawSphere="1"
			   position="@../Volume.position" drawTriangles="1" drawTetrahedra="1"
			   triangles="@Container.triangles" tetrahedra="@../Container.tetrahedra" name="boxROI"/>

			<Node name="Visu">
				<OglModel name="Visual" color="blue" />
				<IdentityMapping object1="../../../Volume" object2="Visual" />
			</Node>
		</Node>
	</Node>
</Node>
