<Node name="root" gravity="0 -9.81 0" dt="0.05">
    <RequiredPlugin name="Sofa.Component.IO.Mesh"/> <!-- Needed to use components [MeshGmshLoader] -->
    <RequiredPlugin name="Sofa.Component.LinearSolver.Iterative"/> <!-- Needed to use components [CGLinearSolver] -->
    <RequiredPlugin name="Sofa.Component.Mapping.Linear"/> <!-- Needed to use components [IdentityMapping] -->
    <RequiredPlugin name="Sofa.Component.Mass"/> <!-- Needed to use components [DiagonalMass] -->
    <RequiredPlugin name="Sofa.Component.ODESolver.Backward"/> <!-- Needed to use components [EulerImplicitSolver] -->
    <RequiredPlugin name="Sofa.Component.SolidMechanics.FEM.Elastic"/> <!-- Needed to use components [TriangularFEMForceField] -->
    <RequiredPlugin name="Sofa.Component.SolidMechanics.Spring"/> <!-- Needed to use components [TriangularBendingSprings] -->
    <RequiredPlugin name="Sofa.Component.StateContainer"/> <!-- Needed to use components [MechanicalObject] -->
    <RequiredPlugin name="Sofa.GL.Component.Rendering3D"/> <!-- Needed to use components [OglModel] -->
    <RequiredPlugin name="SofaBoundaryCondition"/> <!-- Needed to use components [FixedConstraint] -->
    <RequiredPlugin name="SofaGeneralEngine"/> <!-- Needed to use components [SubsetTopology] -->
    <RequiredPlugin name="SofaMeshCollision"/> <!-- Needed to use components [TriangleCollisionModel] -->
    <RequiredPlugin name="SofaMiscCollision"/> <!-- Needed to use components [DefaultCollisionGroupManager] -->
    <DefaultPipeline name="default0" verbose="0" />
    <BruteForceBroadPhase/>
    <BVHNarrowPhase/>
    <DefaultContactManager name="default1" response="PenalityContactForceField" />
    <MinProximityIntersection name="Proximity" alarmDistance="0.8" contactDistance="0.5" />
    <DefaultCollisionGroupManager name="default2" />
    <Node name="SquareGravity">
        <MeshGmshLoader name="meshLoader" filename="mesh/square3.msh" />
        <EulerImplicitSolver name="cg_odesolver"  rayleighStiffness="0.1" rayleighMass="0.1" />
        <CGLinearSolver iterations="100" tolerance="1e-05" threshold="1e-05"/>
        <SubsetTopology template="Vec3d" box="0.3 0 -0.1 0.6 1 0.1" drawTriangle="0" drawROI="1" src="@meshLoader" rest_position="@meshLoader.position" name="Subset" />
        <Node name="in">
            <MechanicalObject template="Vec3d" name="mecaObj2" position="@../meshLoader.position" />
            <TriangleSetTopologyContainer name="Container" position="@mecaObj2.position" triangles="@../Subset.trianglesInROI" />
            <TriangleSetTopologyModifier name="Modifier" />
            <TriangleSetGeometryAlgorithms template="Vec3d" name="GeomAlgo" />
            <DiagonalMass name="default5" massDensity="1.15" />
            <TriangularFEMForceField template="Vec3d" name="FEM" method="large" poissonRatio="0.3" youngModulus="30" />
            <TriangularBendingSprings template="Vec3d" name="FEM-Bend" stiffness="300" damping="1" />
            <TriangleCollisionModel template="Vec3d" name="default7" />

            <Node >
              <OglModel name="Visual" color="blue" />
              <IdentityMapping input="@.." output="@Visual" />
            </Node>        </Node>
        <Node name="Out">
            <MechanicalObject template="Vec3d" name="mecaObj2" position="@../meshLoader.position" />
            <TriangleSetTopologyContainer name="Container" position="@mecaObj2.position" triangles="@../Subset.trianglesOutROI" />
            <TriangleSetTopologyModifier name="Modifier" />
            <TriangleSetGeometryAlgorithms template="Vec3d" name="GeomAlgo" />
            <DiagonalMass name="default5" massDensity="1.15" />
            <TriangularFEMForceField template="Vec3d" name="FEM" method="large" poissonRatio="0.3" youngModulus="30" />
            <TriangularBendingSprings template="Vec3d" name="FEM-Bend" stiffness="300" damping="1" />
            <TriangleCollisionModel template="Vec3d" name="default7" />
            <FixedConstraint template="Vec3d" name="default6" indices="0 1" />
            <Node >
              <OglModel name="Visual" color="red" />
              <IdentityMapping input="@.." output="@Visual" />
            </Node>
	 </Node>
    </Node>
</Node>
