<?xml version="1.0"?>
<Node 	name="Root" gravity="0 0 0" dt="0.02" showVisualModels="1" showBehaviorModels="1" showCollisionModels="1" showBoundingCollisionModels="1" showMappings="1" showMechanicalMappings="1" showForceFields="1" showInteractionForceFields="1" showWireFrame="0" showNormals="0"  >
	<DefaultPipeline name="DefaultCollisionPipeline"  verbose="0"  draw="0"  depth="6" />
	<BruteForceDetection name="Detection" />
	<MinProximityIntersection name="Proximity"  alarmDistance="0.3"  contactDistance="0.2" />
	<DefaultContactManager name="Response"  response="default" />
	<TreeCollisionGroupManager name="Group" />
	<Node 	name="Cube" gravity="0 -9.81 0" showVisualModels="1" showBehaviorModels="1" showCollisionModels="1" showBoundingCollisionModels="1" showMappings="1" showMechanicalMappings="1" showForceFields="1" showInteractionForceFields="1" showWireFrame="0" showNormals="0"  >
		<EulerImplicitSolver name="cg_odesolver"  printLog="0" />
		<CGLinearSolver template="GraphScattered" name="linear solver"  iterations="25"  tolerance="1e-09"  threshold="1e-09" />
		<MechanicalObject template="Vec3d" name="mecaObj"  position="0 0 0"  velocity="0 0 0"  force="0 0 0"  internalForce="0 0 0"  derivX="0 0 0"  free_position="0 0 0"  free_velocity="0 0 0"  restScale="1" />
		<UniformMass template="Vec3d" name="default25"  mass="0.25" />
		<RegularGridTopology name="grid"  n="6 6 6"  min="-10 -10 -10"  max="10 10 10"  p0="-10 -10 -10" />
		<TetrahedronFEMForceField template="Vec3d" name="FEM"  method="large"  poissonRatio="0.4"  youngModulus="1000"  computeGlobalMatrix="0" />
		<BoxROI template="Vec3d" name="box_roi"  box="-11 -11 -11 11 -9 11"  indices="0"  drawSize="0" />
		<FixedConstraint template="Vec3d" name="default27"  indices="@box_roi.indices"  drawSize="0" />
		<Node 	name="Tetra" gravity="0 -9.81 0" showVisualModels="1" showBehaviorModels="1" showCollisionModels="1" showBoundingCollisionModels="1" showMappings="1" showMechanicalMappings="1" showForceFields="1" showInteractionForceFields="1" showWireFrame="0" showNormals="0"  >
			<TetrahedronSetTopologyContainer name="Container" />
			<TetrahedronSetTopologyModifier name="Modifier" />
			<TetrahedronSetTopologyAlgorithms template="Vec3d" name="TopoAlgo" />
			<TetrahedronSetGeometryAlgorithms template="Vec3d" name="GeomAlgo" />
			<TTriangleModel template="Vec3d" name="default30" />
			<Hexa2TetraTopologicalMapping name="default28"  object1="../../grid"  object2="Container" />
			<Node 	name="interpol" gravity="0 -9.81 0" showVisualModels="1" showBehaviorModels="1" showCollisionModels="1" showBoundingCollisionModels="1" showMappings="1" showMechanicalMappings="1" showForceFields="1" showInteractionForceFields="1" showWireFrame="0" showNormals="0"  >
				<ValuesFromPositions template="Vec3d" direction="1 1 0"  position="@../../mecaObj.position"  fieldType="Vector"  drawVectors="1"  drawVectorLength="5" />
			</Node>
		</Node>
	</Node>
</Node>
