<Node name="root" dt="0.01" gravity="0 -10 0">
    <VisualStyle displayFlags="showBehaviorModels showForceFields" />
    <Object type="CollisionPipeline" verbose="0" />
    <Object type="BruteForceDetection" name="N2" />
    <Object type="CollisionResponse" response="default" />
    <!--<Object type="CollisionGroup" />-->
    <Node name="Liver">
        <Object type="EulerImplicit" name="cg_odesolver" printLog="false" />
        <Object type="CGLinearSolver" iterations="25" name="linear solver" tolerance="1.0e-9" threshold="1.0e-9" />
        <Object type="MeshGmshLoader" name="loader" filename="mesh/liver.msh" />
        <Object type="Mesh" src="@loader" />
        <Object type="MechanicalObject" src="@loader" template="Vec3f" name="Liver" />
        <Object type="UniformMass" name="mass" mass="0.05" />
        <Object type="TetrahedronFEMForceField" name="FEM" youngModulus="5000" poissonRatio="0.3" computeGlobalMatrix="false" method="large" />
        <Object type="ConicalForceField" template="Vec3f" coneCenter="0.0 -10.0 0.0" coneHeight="0 20 0" coneAngle="40" />
        <Node name="Visu">
            <Object type="OglModel" name="VisualModel" fileMesh="mesh/liver-smooth.obj" color="red" />
            <Object type="BarycentricMapping" object1="../.." object2="VisualModel" />
        </Node>
        <Node name="Surf">
	    <SphereLoader filename="mesh/liver.sph" />
            <MechanicalObject position="@[-1].position" />
            <Object type="Sphere" name="CollisionModel" listRadius="@[-2].listRadius" />
            <Object type="BarycentricMapping" />
        </Node>
    </Node>
</Node>
