<?xml version="1.0" ?>
<Node name="root" dt="0.01" gravity="0 0 -1">
    <VisualStyle displayFlags="showBehavior hideCollision hideVisual " />
    <EdgeSetGeometryAlgorithms />
    <EulerImplicitSolver />
    <CGLinearSolver />
    <Node name="Thin shell">
                <MeshObjLoader name="loader" filename="mesh/triangleGrid_10_10.obj" />
                <MeshTopology src="@loader" />
                <MechanicalObject name="defoDOF" template="Vec3d"  src="@loader" />
                <BoxConstraint box="-0.5 -0.5 -0.5  100.5 0.005 0.005  " />
                <TriangleFEMForceField name="FEM1" youngModulus="20000" poissonRatio="0.3" method="large" />
                <FastTriangularBendingSprings bendingStiffness="10000" />
                <UniformMass totalMass="2500" printLog="0" />
    </Node>
</Node>
