<Node name="root" dt="0.005" gravity="0 0 0">
    <RequiredPlugin name="SofaOpenglVisual"/>
    <VisualStyle displayFlags="showBehaviorModels showForceFields" />
    <Node name="TorusRigidX">
        <EulerSolver />
        <CGLinearSolver iterations="25" threshold="0.00000001" tolerance="1e-5"/>
        <MechanicalObject template="Rigid" dx="2" dy="0" dz="0" rx="0" ry="0" rz="0" scale="1.0" />
        <UniformMass />
        <!-- forces for a rigid is composed of two parts translation of the rigid dof [x y z] and a quaternion for the rotation [x y z w] -->
        <LinearForceField points="0" forces="0 0 0 0 0 0  1 0 0 0 0 0  -1 0 0 0 0 0  -1 0 0 0 0 0  0 0 0 0 0 0" force="2.0" times="0 4 8 10 12" />
        <Node name="Visu">
            <OglModel name="Visual" fileMesh="mesh/torus.obj" color="gray" scale="0.3" />
            <RigidMapping input="@.." output="@Visual" />
        </Node>
    </Node>
    <Node name="TorusRigidY">
        <EulerSolver />
        <CGLinearSolver iterations="25" threshold="0.00000001" tolerance="1e-5"/>
        <MechanicalObject template="Rigid" dx="2" dy="2" dz="0" rx="0" ry="0" rz="0" scale="1.0" />
        <UniformMass />
        <!-- forces for a rigid is composed of two parts translation of the rigid dof [x y z] and a quaternion for the rotation [x y z w] -->
        <LinearForceField points="0" forces="0 0 0 0 0 0  0 1 0 0 0 0  0 -1 0 0 0 0  0 -1 0 0 0 0  0 0 0 0 0 0" force="2.0" times="0 4 8 10 12" />
        <Node name="Visu">
            <OglModel name="Visual" fileMesh="mesh/torus.obj" color="gray" scale="0.3" />
            <RigidMapping input="@.." output="@Visual" />
        </Node>
    </Node>
</Node>
