<Node name="root" dt="0.02">
    <RequiredPlugin name="SofaOpenglVisual"/>
    <DefaultPipeline depth="6" verbose="0" draw="0" />
    <BruteForceDetection name="N2" />
    <NewProximityIntersection name="Proximity" alarmDistance="0.3" contactDistance="0.2" />
    <DefaultContactManager name="Response" response="default" />
    <DefaultCollisionGroupManager name="Group" />
    <Node name="Chain">
        <Node name="TorusFixed">
            <MeshObjLoader name="loader" filename="mesh/torus2_for_collision.obj" />
            <Mesh src="@loader" />
            <MechanicalObject src="@loader" />
            <TriangleCollisionModel simulated="0" moving="0" />
            <OglModel name="Visual" fileMesh="mesh/torus2.obj" color="gray" />
        </Node>
        <Node name="TorusFFD1">
            <EulerImplicitSolver name="cg_odesolver" printLog="false"  rayleighStiffness="0.1" rayleighMass="0.1" />
            <CGLinearSolver iterations="25" name="linear solver" tolerance="1.0e-9" threshold="1.0e-9" />
            <MechanicalObject translation="2.5 0 0" />
            <UniformMass totalMass="5" />
            <RegularGrid nx="6" ny="2" nz="5" xmin="-2.5" xmax="2.5" ymin="-0.5" ymax="0.5" zmin="-2" zmax="2" />
            <RegularGridSpringForceField name="Springs" stiffness="200" damping="2" />
            <Node name="Visu">
                <OglModel name="Visual" fileMesh="mesh/torus.obj" dx="2.5" color="yellow" />
                <BarycentricMapping input="@.." output="@Visual" />
            </Node>
            <Node name="Surf2">
                <MeshObjLoader name="loader" filename="mesh/torus_for_collision.obj" />
                <Mesh src="@loader" />
                <MechanicalObject src="@loader" translation="2.5 0 0" />
                <TriangleCollisionModel />
                <BarycentricMapping />
            </Node>
        </Node>
        <Node name="TorusFFD2">
            <EulerImplicitSolver name="cg_odesolver" printLog="false" />
            <CGLinearSolver iterations="25" name="linear solver" tolerance="1.0e-9" threshold="1.0e-9" />
            <MechanicalObject dx="5" />
            <UniformMass totalMass="5" />
            <RegularGrid nx="6" ny="5" nz="2" xmin="-2.5" xmax="2.5" ymin="-2" ymax="2" zmin="-0.5" zmax="0.5" />
            <RegularGridSpringForceField name="Springs" stiffness="200" damping="2" />
            <Node name="Visu">
                <OglModel name="Visual" fileMesh="mesh/torus2.obj" dx="5" color="yellow" />
                <BarycentricMapping input="@.." output="@Visual" />
            </Node>
            <Node name="Surf2">
                <MeshObjLoader name="loader" filename="mesh/torus2_for_collision.obj" />
                <Mesh src="@loader" />
                <MechanicalObject src="@loader" dx="5" />
                <TriangleCollisionModel />
                <BarycentricMapping />
            </Node>
        </Node>
        <Node name="TorusFFD3">
            <EulerImplicitSolver name="cg_odesolver" printLog="false" />
            <CGLinearSolver iterations="25" name="linear solver" tolerance="1.0e-9" threshold="1.0e-9" />
            <MechanicalObject dx="7.5" />
            <UniformMass totalMass="5" />
            <RegularGrid nx="6" ny="2" nz="5" xmin="-2.5" xmax="2.5" ymin="-0.5" ymax="0.5" zmin="-2" zmax="2" />
            <RegularGridSpringForceField name="Springs" stiffness="200" damping="2" />
            <Node name="Visu">
                <OglModel name="Visual" fileMesh="mesh/torus.obj" dx="7.5" color="yellow" />
                <BarycentricMapping input="@.." output="@Visual" />
            </Node>
            <Node name="Surf2">
                <MeshObjLoader name="loader" filename="mesh/torus_for_collision.obj" />
                <Mesh src="@loader" />
                <MechanicalObject src="@loader" dx="7.5" />
                <TriangleCollisionModel />
                <BarycentricMapping />
            </Node>
        </Node>
        <Node name="TorusFFD4">
            <EulerImplicitSolver name="cg_odesolver" printLog="false" />
            <CGLinearSolver iterations="25" name="linear solver" tolerance="1.0e-9" threshold="1.0e-9" />
            <MechanicalObject dx="10" />
            <UniformMass totalMass="5" />
            <RegularGrid nx="6" ny="5" nz="2" xmin="-2.5" xmax="2.5" ymin="-2" ymax="2" zmin="-0.5" zmax="0.5" />
            <RegularGridSpringForceField name="Springs" stiffness="200" damping="2" />
            <Node name="Visu">
                <OglModel name="Visual" fileMesh="mesh/torus2.obj" dx="10" color="yellow" />
                <BarycentricMapping input="@.." output="@Visual" />
            </Node>
            <Node name="Surf2">
                <MeshObjLoader name="loader" filename="mesh/torus2_for_collision.obj" />
                <Mesh src="@loader" />
                <MechanicalObject src="@loader" dx="10" />
                <TriangleCollisionModel />
                <BarycentricMapping />
            </Node>
        </Node>
    </Node>
</Node>
