<!-- Mechanical InteractionEllipsoidForceField Example -->
<Node name="root" gravity="0.0 -2.0 0.0" dt="0.04">
    <VisualStyle displayFlags="showBehaviorModels showForceFields showVisual" />
    <CollisionPipeline verbose="0" />
    <BruteForceDetection name="N2" />
    <CollisionResponse name="Response" />
    <NewProximityIntersection alarmDistance="0.002" contactDistance="0.001" />
    <Node name="RotatingObstacle">
        <Euler name="odesolver" printLog="false" />
        <MechanicalObject name="MS2" template="Rigid" position="0 5 3 0 0 0 1" velocity="0 0 0 -0.1 0 0" />
        <UniformMass totalmass="1" />
        <PartialFixedConstraint indices="0" fixedDirections="1 1 1 0 0 0" />
    </Node>
    <Node name="SquareCloth1">
        <EulerImplicit name="odesolver" printLog="false" />
        <CGLinearSolver iterations="25" name="linear solver" tolerance="1.0e-9" threshold="1.0e-9" />
        <MechanicalObject name="MS1" />
        <UniformMass totalmass="100" />
        <RegularGrid nx="20" ny="1" nz="20" xmin="12" xmax="-12" ymin="7" ymax="7" zmin="-12" zmax="12" />
        <BoxConstraint box="-12 7 12 -10 7 12" />
        <BoxConstraint box="10 7 12 12 7 12" />
        <MeshSpringForceField name="Springs" stiffness="2000" damping="0" />
        <QuadBendingSprings name="Bend" stiffness="20" damping="0" />
        <InteractionEllipsoidForceField object1="@MS1" object2="@../RotatingObstacle/MS2" stiffness="1000" damping="1" center="0 0 0" vradius="6 2 6" object2_forces="false" object2_invert="false" />
        <!--EllipsoidForceField stiffness="1000" damping="1" center="0 5 3" vradius="6 2 6" /-->
        <Node name="Visu">
            <OglModel name="Visual" color="green" />
            <IdentityMapping object1="../.." object2="Visual" />
        </Node>
    </Node>
</Node>
