<?xml version="1.0" ?>
<Node name="root" dt="0.02">
    <RequiredPlugin name="SofaOpenglVisual"/>
    <VisualStyle displayFlags="showBehaviorModels showMappings" />
    <DefaultPipeline depth="6" verbose="0" draw="0" />
    <BruteForceDetection name="N2" />
    <MinProximityIntersection name="Proximity" alarmDistance="0.3" contactDistance="0.2" />
    <DefaultContactManager name="Response" response="default" />
    <DefaultCollisionGroupManager name="Group" />
    <Node name="Chain">
        <Node name="TorusFixed">
            <MeshObjLoader name="loader" filename="mesh/torus2_for_collision.obj" />
            <Mesh src="@loader" />
            <MechanicalObject src="@loader" />
            <TriangleCollisionModel simulated="0" moving="0" />
            <LineCollisionModel simulated="0" moving="0" />
            <PointCollisionModel simulated="0" moving="0" />
            <OglModel name="Visual" fileMesh="mesh/torus2.obj" color="gray" />
        </Node>
        <Node name="TorusFEM">
            <EulerImplicitSolver rayleighStiffness="0.01"  rayleighMass="0.1" />
            <CGLinearSolver iterations="100" threshold="0.00000001" tolerance="1e-5"/>
            <MeshGmshLoader name="loader" filename="mesh/torus_low_res.msh" />
            <Mesh src="@loader" />
            <MechanicalObject src="@loader" dx="2.5" />
            <UniformMass vertexMass="0.1" />
            <TetrahedronFEMForceField name="FEM" youngModulus="1000" poissonRatio="0.3" computeGlobalMatrix="false" method="polar" />
            <Node name="Visu">
                <OglModel name="Visual" fileMesh="mesh/torus.obj" color="red" dx="2.5" />
                <BarycentricMapping input="@.." output="@Visual" />
            </Node>
            <Node name="Surf2">
                <MeshObjLoader name="loader" filename="mesh/torus_for_collision.obj" />
                <Mesh src="@loader" />
                <MechanicalObject src="@loader" dx="2.5" />
                <TriangleCollisionModel />
                <LineCollisionModel />
                <PointCollisionModel />
                <BarycentricMapping />
            </Node>
        </Node>
        <Node name="TorusSpring">
            <EulerImplicitSolver rayleighStiffness="0.01" />
            <CGLinearSolver iterations="100" threshold="0.00000001" tolerance="1e-5"/>
            <MeshGmshLoader name="loader" filename="mesh/torus2_low_res.msh" />
            <Mesh src="@loader" />
            <MechanicalObject src="@loader" dx="5" />
            <UniformMass totalMass="5" />
            <MeshSpringForceField name="Springs" tetrasStiffness="400" tetrasDamping="4" />
            <Node name="Visu">
                <OglModel name="Visual" fileMesh="mesh/torus2.obj" dx="5" color="green" />
                <BarycentricMapping input="@.." output="@Visual" />
            </Node>
            <Node name="Surf2">
                <MeshObjLoader name="loader" filename="mesh/torus2_for_collision.obj" />
                <Mesh src="@loader" />
                <MechanicalObject src="@loader" dx="5" />
                <TriangleCollisionModel />
                <LineCollisionModel />
                <PointCollisionModel />
                <BarycentricMapping />
            </Node>
        </Node>
        <Node name="TorusFFD">
            <EulerImplicitSolver rayleighStiffness="0.01" />
            <CGLinearSolver iterations="100" threshold="0.00000001" tolerance="1e-5"/>
            <MechanicalObject dx="7.5" />
            <UniformMass totalMass="5" />
            <RegularGrid nx="6" ny="2" nz="5" xmin="-2.5" xmax="2.5" ymin="-0.5" ymax="0.5" zmin="-2" zmax="2" />
            <RegularGridSpringForceField name="Springs" stiffness="200" damping="2" />
            <Node name="Visu">
                <OglModel name="Visual" fileMesh="mesh/torus.obj" color="yellow" />
                <BarycentricMapping input="@.." output="@Visual" />
            </Node>
            <Node name="Surf2">
                <MeshObjLoader name="loader" filename="mesh/torus_for_collision.obj" />
                <Mesh src="@loader" />
                <MechanicalObject src="@loader" />
                <TriangleCollisionModel />
                <LineCollisionModel />
                <PointCollisionModel />
                <BarycentricMapping />
            </Node>
        </Node>
        <Node name="TorusRigid">
            <EulerImplicitSolver rayleighStiffness="0.01" />
            <CGLinearSolver iterations="100" threshold="0.00000001" tolerance="1e-5"/>
            <MechanicalObject template="Rigid" dx="10" />
            <UniformMass filename="BehaviorModels/torus2.rigid" />
            <Node name="Visu">
                <OglModel name="Visual" fileMesh="mesh/torus2.obj" color="gray" />
                <RigidMapping input="@.." output="@Visual" />
            </Node>
            <Node name="Surf2">
                <MeshObjLoader name="loader" filename="mesh/torus2_for_collision.obj" />
                <Mesh src="@loader" />
                <MechanicalObject src="@loader" />
                <TriangleCollisionModel />
                <LineCollisionModel />
                <PointCollisionModel />
                <RigidMapping />
            </Node>
        </Node>
    </Node>
    <Node name="ChainFEM">
        <Node name="TorusFixed">
            <MeshObjLoader name="loader" filename="mesh/torus2_for_collision.obj" />
            <Mesh src="@loader" />
            <MechanicalObject src="@loader" dz="6" />
            <TriangleCollisionModel simulated="0" moving="0" />
            <LineCollisionModel simulated="0" moving="0" />
            <PointCollisionModel simulated="0" moving="0" />
            <OglModel name="Visual" fileMesh="mesh/torus2.obj" color="gray" dz="6" />
        </Node>
        <Node name="TorusFEM">
            <EulerImplicitSolver rayleighStiffness="0.01" />
            <CGLinearSolver iterations="100" threshold="0.00000001" tolerance="1e-5"/>
            <MeshGmshLoader name="loader" filename="mesh/torus_low_res.msh" />
            <Mesh src="@loader" />
            <MechanicalObject src="@loader" dx="2.5" dz="6" />
            <UniformMass totalMass="5" />
            <TetrahedronFEMForceField name="FEM" youngModulus="1000" poissonRatio="0.3" computeGlobalMatrix="false" method="polar" />
            <Node name="Visu">
                <OglModel name="Visual" fileMesh="mesh/torus.obj" color="red" dx="2.5" dz="6" />
                <BarycentricMapping input="@.." output="@Visual" />
            </Node>
            <Node name="Surf2">
                <MeshObjLoader name="loader" filename="mesh/torus_for_collision.obj" />
                <Mesh src="@loader" />
                <MechanicalObject src="@loader" dx="2.5" dz="6" />
                <TriangleCollisionModel />
                <LineCollisionModel />
                <PointCollisionModel />
                <BarycentricMapping />
            </Node>
        </Node>
        <Node name="TorusFEM">
            <EulerImplicitSolver rayleighStiffness="0.01" />
            <CGLinearSolver iterations="100" threshold="0.00000001" tolerance="1e-5"/>
            <MeshGmshLoader name="loader" filename="mesh/torus2_low_res.msh" />
            <Mesh src="@loader" />
            <MechanicalObject src="@loader" dx="5" dz="6" />
            <UniformMass totalMass="5" />
            <TetrahedronFEMForceField name="FEM" youngModulus="1000" poissonRatio="0.3" computeGlobalMatrix="false" method="polar" />
            <Node name="Visu">
                <OglModel name="Visual" fileMesh="mesh/torus2.obj" color="red" dx="5" dz="6" />
                <BarycentricMapping input="@.." output="@Visual" />
            </Node>
            <Node name="Surf2">
                <MeshObjLoader name="loader" filename="mesh/torus2_for_collision.obj" />
                <Mesh src="@loader" />
                <MechanicalObject src="@loader" dx="5" dz="6" />
                <TriangleCollisionModel />
                <LineCollisionModel />
                <PointCollisionModel />
                <BarycentricMapping />
            </Node>
        </Node>
        <Node name="TorusFEM">
            <EulerImplicitSolver rayleighStiffness="0.01" />
            <CGLinearSolver iterations="100" threshold="0.00000001" tolerance="1e-5"/>
            <MeshGmshLoader name="loader" filename="mesh/torus_low_res.msh" />
            <Mesh src="@loader" />
            <MechanicalObject src="@loader" dx="7.5" dz="6" />
            <UniformMass totalMass="5" />
            <TetrahedronFEMForceField name="FEM" youngModulus="1000" poissonRatio="0.3" computeGlobalMatrix="false" method="polar" />
            <Node name="Visu">
                <OglModel name="Visual" fileMesh="mesh/torus.obj" color="red" dx="7.5" dz="6" />
                <BarycentricMapping input="@.." output="@Visual" />
            </Node>
            <Node name="Surf2">
                <MeshObjLoader name="loader" filename="mesh/torus_for_collision.obj" />
                <Mesh src="@loader" />
                <MechanicalObject src="@loader" dx="7.5" dz="6" />
                <TriangleCollisionModel />
                <LineCollisionModel />
                <PointCollisionModel />
                <BarycentricMapping />
            </Node>
        </Node>
        <Node name="TorusFEM">
            <EulerImplicitSolver rayleighStiffness="0.01" />
            <CGLinearSolver iterations="100" threshold="0.00000001" tolerance="1e-5"/>
            <MeshGmshLoader name="loader" filename="mesh/torus2_low_res.msh" />
            <Mesh src="@loader" />
            <MechanicalObject src="@loader" dx="10" dz="6" />
            <UniformMass totalMass="5" />
            <TetrahedronFEMForceField name="FEM" youngModulus="1000" poissonRatio="0.3" computeGlobalMatrix="false" method="polar" />
            <Node name="Visu">
                <OglModel name="Visual" fileMesh="mesh/torus2.obj" color="red" dx="10" dz="6" />
                <BarycentricMapping input="@.." output="@Visual" />
            </Node>
            <Node name="Surf2">
                <MeshObjLoader name="loader" filename="mesh/torus2_for_collision.obj" />
                <Mesh src="@loader" />
                <MechanicalObject src="@loader" dx="10" dz="6" />
                <TriangleCollisionModel />
                <LineCollisionModel />
                <PointCollisionModel />
                <BarycentricMapping />
            </Node>
        </Node>
    </Node>
    <Node name="ChainSpring">
        <Node name="TorusFixed">
            <MeshObjLoader name="loader" filename="mesh/torus2_for_collision.obj" />
            <Mesh src="@loader" />
            <MechanicalObject src="@loader" dz="12" />
            <TriangleCollisionModel simulated="0" moving="0" />
            <LineCollisionModel simulated="0" moving="0" />
            <PointCollisionModel simulated="0" moving="0" />
            <OglModel name="Visual" fileMesh="mesh/torus2.obj" dz="12" color="gray" />
        </Node>
        <Node name="TorusSpring">
            <EulerImplicitSolver rayleighStiffness="0.01" />
            <CGLinearSolver iterations="100" threshold="0.00000001" tolerance="1e-5"/>
            <MeshGmshLoader name="loader" filename="mesh/torus_low_res.msh" />
            <Mesh src="@loader" />
            <MechanicalObject src="@loader" dx="2.5" dz="12" />
            <UniformMass totalMass="5" />
            <MeshSpringForceField name="Springs" tetrasStiffness="400" tetrasDamping="4" />
            <Node name="Visu">
                <OglModel name="Visual" fileMesh="mesh/torus.obj" dx="2.5" dz="12" color="green" />
                <BarycentricMapping input="@.." output="@Visual" />
            </Node>
            <Node name="Surf2">
                <MeshObjLoader name="loader" filename="mesh/torus_for_collision.obj" />
                <Mesh src="@loader" />
                <MechanicalObject src="@loader" dx="2.5" dz="12" />
                <TriangleCollisionModel />
                <LineCollisionModel />
                <PointCollisionModel />
                <BarycentricMapping />
            </Node>
        </Node>
        <Node name="TorusSpring">
            <EulerImplicitSolver rayleighStiffness="0.01" />
            <CGLinearSolver iterations="100" threshold="0.00000001" tolerance="1e-5"/>
            <MeshGmshLoader name="loader" filename="mesh/torus2_low_res.msh" />
            <Mesh src="@loader" />
            <MechanicalObject src="@loader" dx="5" dz="12" />
            <UniformMass totalMass="5" />
            <MeshSpringForceField name="Springs" tetrasStiffness="400" tetrasDamping="4" />
            <Node name="Visu">
                <OglModel name="Visual" fileMesh="mesh/torus2.obj" dx="5" dz="12" color="green" />
                <BarycentricMapping input="@.." output="@Visual" />
            </Node>
            <Node name="Surf2">
                <MeshObjLoader name="loader" filename="mesh/torus2_for_collision.obj" />
                <Mesh src="@loader" />
                <MechanicalObject src="@loader" dx="5" dz="12" />
                <TriangleCollisionModel />
                <LineCollisionModel />
                <PointCollisionModel />
                <BarycentricMapping />
            </Node>
        </Node>
        <Node name="TorusSpring">
            <EulerImplicitSolver rayleighStiffness="0.01" />
            <CGLinearSolver iterations="100" threshold="0.00000001" tolerance="1e-5"/>
            <MeshGmshLoader name="loader" filename="mesh/torus_low_res.msh" />
            <Mesh src="@loader" />
            <MechanicalObject src="@loader" dx="7.5" dz="12" />
            <UniformMass totalMass="5" />
            <MeshSpringForceField name="Springs" tetrasStiffness="400" tetrasDamping="4" />
            <Node name="Visu">
                <OglModel name="Visual" fileMesh="mesh/torus.obj" dx="7.5" dz="12" color="green" />
                <BarycentricMapping input="@.." output="@Visual" />
            </Node>
            <Node name="Surf2">
                <MeshObjLoader name="loader" filename="mesh/torus_for_collision.obj" />
                <Mesh src="@loader" />
                <MechanicalObject src="@loader" dx="7.5" dz="12" />
                <TriangleCollisionModel />
                <LineCollisionModel />
                <PointCollisionModel />
                <BarycentricMapping />
            </Node>
        </Node>
        <Node name="TorusSpring">
            <EulerImplicitSolver rayleighStiffness="0.01" />
            <CGLinearSolver iterations="100" threshold="0.00000001" tolerance="1e-5"/>
            <MeshGmshLoader name="loader" filename="mesh/torus2_low_res.msh" />
            <Mesh src="@loader" />
            <MechanicalObject src="@loader" dx="10" dz="12" />
            <UniformMass totalMass="5" />
            <MeshSpringForceField name="Springs" tetrasStiffness="400" tetrasDamping="4" />
            <Node name="Visu">
                <OglModel name="Visual" fileMesh="mesh/torus2.obj" dx="10" dz="12" color="green" />
                <BarycentricMapping input="@.." output="@Visual" />
            </Node>
            <Node name="Surf2">
                <MeshObjLoader name="loader" filename="mesh/torus2_for_collision.obj" />
                <Mesh src="@loader" />
                <MechanicalObject src="@loader" dx="10" dz="12" />
                <TriangleCollisionModel />
                <LineCollisionModel />
                <PointCollisionModel />
                <BarycentricMapping />
            </Node>
        </Node>
    </Node>
    <Node name="ChainFFD">
        <Node name="TorusFixed">
            <MeshObjLoader name="loader" filename="mesh/torus2_for_collision.obj" />
            <Mesh src="@loader" />
            <MechanicalObject src="@loader" dz="18" />
            <TriangleCollisionModel simulated="0" moving="0" />
            <LineCollisionModel simulated="0" moving="0" />
            <PointCollisionModel simulated="0" moving="0" />
            <OglModel name="Visual" fileMesh="mesh/torus2.obj" dz="18" color="gray" />
        </Node>
        <Node name="TorusFFD">
            <EulerImplicitSolver rayleighStiffness="0.01" />
            <CGLinearSolver iterations="100" threshold="0.00000001" tolerance="1e-5"/>
            <MechanicalObject dx="2.5" dz="18" />
            <UniformMass totalMass="5" />
            <RegularGrid nx="6" ny="2" nz="5" xmin="-2.5" xmax="2.5" ymin="-0.5" ymax="0.5" zmin="-2" zmax="2" />
            <RegularGridSpringForceField name="Springs" stiffness="200" damping="2" />
            <Node name="Visu">
                <OglModel name="Visual" fileMesh="mesh/torus.obj" color="yellow" />
                <BarycentricMapping input="@.." output="@Visual" />
            </Node>
            <Node name="Surf2">
                <MeshObjLoader name="loader" filename="mesh/torus_for_collision.obj" />
                <Mesh src="@loader" />
                <MechanicalObject src="@loader" />
                <TriangleCollisionModel />
                <LineCollisionModel />
                <PointCollisionModel />
                <BarycentricMapping />
            </Node>
        </Node>
        <Node name="TorusFFD">
            <EulerImplicitSolver rayleighStiffness="0.01" />
            <CGLinearSolver iterations="100" threshold="0.00000001" tolerance="1e-5"/>
            <MechanicalObject dx="5" dz="18" />
            <UniformMass totalMass="5" />
            <RegularGrid nx="6" ny="5" nz="2" xmin="-2.5" xmax="2.5" ymin="-2" ymax="2" zmin="-0.5" zmax="0.5" />
            <RegularGridSpringForceField name="Springs" stiffness="200" damping="2" />
            <Node name="Visu">
                <OglModel name="Visual" fileMesh="mesh/torus2.obj" color="yellow" />
                <BarycentricMapping input="@.." output="@Visual" />
            </Node>
            <Node name="Surf2">
                <MeshObjLoader name="loader" filename="mesh/torus2_for_collision.obj" />
                <Mesh src="@loader" />
                <MechanicalObject src="@loader" />
                <TriangleCollisionModel />
                <LineCollisionModel />
                <PointCollisionModel />
                <BarycentricMapping />
            </Node>
        </Node>
        <Node name="TorusFFD">
            <EulerImplicitSolver rayleighStiffness="0.01" />
            <CGLinearSolver iterations="100" threshold="0.00000001" tolerance="1e-5"/>
            <MechanicalObject dx="7.5" dz="18" />
            <UniformMass totalMass="5" />
            <RegularGrid nx="6" ny="2" nz="5" xmin="-2.5" xmax="2.5" ymin="-0.5" ymax="0.5" zmin="-2" zmax="2" />
            <RegularGridSpringForceField name="Springs" stiffness="200" damping="2" />
            <Node name="Visu">
                <OglModel name="Visual" fileMesh="mesh/torus.obj" color="yellow" />
                <BarycentricMapping input="@.." output="@Visual" />
            </Node>
            <Node name="Surf2">
                <MeshObjLoader name="loader" filename="mesh/torus_for_collision.obj" />
                <Mesh src="@loader" />
                <MechanicalObject src="@loader" />
                <TriangleCollisionModel />
                <LineCollisionModel />
                <PointCollisionModel />
                <BarycentricMapping />
            </Node>
        </Node>
        <Node name="TorusFFD">
            <EulerImplicitSolver rayleighStiffness="0.01" />
            <CGLinearSolver iterations="100" threshold="0.00000001" tolerance="1e-5"/>
            <MechanicalObject dx="10" dz="18" />
            <UniformMass totalMass="5" />
            <RegularGrid nx="6" ny="5" nz="2" xmin="-2.5" xmax="2.5" ymin="-2" ymax="2" zmin="-0.5" zmax="0.5" />
            <RegularGridSpringForceField name="Springs" stiffness="200" damping="2" />
            <Node name="Visu">
                <OglModel name="Visual" fileMesh="mesh/torus2.obj" color="yellow" />
                <BarycentricMapping input="@.." output="@Visual" />
            </Node>
            <Node name="Surf2">
                <MeshObjLoader name="loader" filename="mesh/torus2_for_collision.obj" />
                <Mesh src="@loader" />
                <MechanicalObject src="@loader" />
                <TriangleCollisionModel />
                <LineCollisionModel />
                <PointCollisionModel />
                <BarycentricMapping />
            </Node>
        </Node>
    </Node>
    <Node name="ChainRigid">
        <Node name="TorusFixed">
            <MeshObjLoader name="loader" filename="mesh/torus2_for_collision.obj" />
            <Mesh src="@loader" />
            <MechanicalObject src="@loader" dz="24" />
            <TriangleCollisionModel simulated="0" moving="0" />
            <LineCollisionModel simulated="0" moving="0" />
            <PointCollisionModel simulated="0" moving="0" />
            <OglModel name="Visual" fileMesh="mesh/torus2.obj" dz="24" color="gray" />
        </Node>
        <Node name="TorusRigid">
            <EulerImplicitSolver rayleighStiffness="0" />
            <CGLinearSolver iterations="100" threshold="0.00000001" tolerance="1e-5"/>
            <MechanicalObject template="Rigid" dx="2.5" dz="24" />
            <UniformMass filename="BehaviorModels/torus.rigid" />
            <Node name="Visu">
                <OglModel name="Visual" fileMesh="mesh/torus.obj" color="gray" />
                <RigidMapping input="@.." output="@Visual" />
            </Node>
            <Node name="Surf2">
                <MeshObjLoader name="loader" filename="mesh/torus_for_collision.obj" />
                <Mesh src="@loader" />
                <MechanicalObject src="@loader" />
                <TriangleCollisionModel />
                <LineCollisionModel />
                <PointCollisionModel />
                <RigidMapping />
            </Node>
        </Node>
        <Node name="TorusRigid">
            <EulerImplicitSolver rayleighStiffness="0" />
            <CGLinearSolver iterations="100" threshold="0.00000001" tolerance="1e-5"/>
            <MechanicalObject template="Rigid" dx="5" dz="24" />
            <UniformMass filename="BehaviorModels/torus2.rigid" />
            <Node name="Visu">
                <OglModel name="Visual" fileMesh="mesh/torus2.obj" color="gray" />
                <RigidMapping input="@.." output="@Visual" />
            </Node>
            <Node name="Surf2">
                <MeshObjLoader name="loader" filename="mesh/torus2_for_collision.obj" />
                <Mesh src="@loader" />
                <MechanicalObject src="@loader" />
                <TriangleCollisionModel />
                <LineCollisionModel />
                <PointCollisionModel />
                <RigidMapping />
            </Node>
        </Node>
        <Node name="TorusRigid">
            <EulerImplicitSolver rayleighStiffness="0" />
            <CGLinearSolver iterations="100" threshold="0.00000001" tolerance="1e-5"/>
            <MechanicalObject template="Rigid" dx="7.5" dz="24" />
            <UniformMass filename="BehaviorModels/torus.rigid" />
            <Node name="Visu">
                <OglModel name="Visual" fileMesh="mesh/torus.obj" color="gray" />
                <RigidMapping input="@.." output="@Visual" />
            </Node>
            <Node name="Surf2">
                <MeshObjLoader name="loader" filename="mesh/torus_for_collision.obj" />
                <Mesh src="@loader" />
                <MechanicalObject src="@loader" />
                <TriangleCollisionModel />
                <LineCollisionModel />
                <PointCollisionModel />
                <RigidMapping />
            </Node>
        </Node>
        <Node name="TorusRigid">
            <EulerImplicitSolver rayleighStiffness="0" />
            <CGLinearSolver iterations="100" threshold="0.00000001" tolerance="1e-5"/>
            <MechanicalObject template="Rigid" dx="10" dz="24" />
            <UniformMass filename="BehaviorModels/torus2.rigid" />
            <Node name="Visu">
                <OglModel name="Visual" fileMesh="mesh/torus2.obj" color="gray" />
                <RigidMapping input="@.." output="@Visual" />
            </Node>
            <Node name="Surf2">
                <MeshObjLoader name="loader" filename="mesh/torus2_for_collision.obj" />
                <Mesh src="@loader" />
                <MechanicalObject src="@loader" />
                <TriangleCollisionModel />
                <LineCollisionModel />
                <PointCollisionModel />
                <RigidMapping />
            </Node>
        </Node>
    </Node>
</Node>
