<Node name="root" gravity="0 0 0" dt="0.01">
    <RequiredPlugin name="SofaOpenglVisual"/>
    <!-- A soft grape containing a very stiff seed is deformed by using only one element. By using the HexahedronCompositeFEMMapping, the seed does not deform.  -->
    <VisualStyle displayFlags="showVisual showBehaviorModels showForceFields" />
    <OglModel name="plan" fileMesh="mesh/plane_loop_2.obj" rx="90" rz="90" scale="1" dy="-10.2" material="Default Diffuse 1 1 0.4 0.4 1 Ambient 1 0.8 0.8 0.8 1 Specular 0 1 1 1 1 Emissive 0 1 1 1 1 Shininess 0 45"/>
    <Node name="HexahedronCompositeFEMMapping">
        <SparseGridMultiple n="2 2 2" fileTopology="mesh/grape_out.obj" fileTopologies="mesh/grape_out.obj mesh/grape_in.obj" stiffnessCoefs="1 1000000" massCoefs="1 1" nbVirtualFinerLevels="4" finestConnectivity="false" />
        <EulerImplicitSolver rayleighMass="0" rayleighStiffness="0" />
        <CGLinearSolver iterations="2000" tolerance="1e-5" threshold="1e-5"/>
        <MechanicalObject dx="15" />
        <HexahedronCompositeFEMForceFieldAndMass completeInterpolation="false" nbVirtualFinerLevels="3" youngModulus="100" poissonRatio="0.35" method="large" density="2" updateStiffnessMatrix="false" printLog="0" useMass="false" totalMass="1" drawSize=".5" />
        <BoxConstraint box="-30 -11 -30   100 -9 30" drawSize="0.75" />
        <Node name="Collinonunif">
            <MeshObjLoader name="loader" filename="mesh/grape_out.obj" />
            <Mesh src="@loader" />
            <MechanicalObject src="@loader" />
            <HexahedronCompositeFEMMapping/>
            <Node name="f1">
                <ConstantForceField points="340" forces="1000 8000 0" arrowSizeCoef=".001" />
            </Node>
            <Node name="Visu2">
                <OglModel name="VisualEyes" fileMesh="mesh/grape_out.obj" normals="0" color="0.1 .8 .3 .5" />
                <IdentityMapping input="@.." output="@VisualEyes" />
            </Node>
        </Node>
        <Node name="Visu1">
            <OglModel name="VisualBody" fileMesh="mesh/grape_in.obj" normals="0" color="0 0 .6 1" />
            <HexahedronCompositeFEMMapping input="@.." output="@VisualBody" />
        </Node>
    </Node>
    <Node name="BarycentricMapping">
        <SparseGridMultiple n="2 2 2" fileTopology="mesh/grape_out.obj" fileTopologies="mesh/grape_out.obj mesh/grape_in.obj" stiffnessCoefs="1 1000000" massCoefs="1 1" nbVirtualFinerLevels="4" finestConnectivity="false" />
        <EulerImplicitSolver rayleighMass="0" rayleighStiffness="0" />
        <CGLinearSolver iterations="2000" tolerance="1e-5" threshold="1e-5"/>
        <MechanicalObject dx="-15" />
        <HexahedronCompositeFEMForceFieldAndMass completeInterpolation="true" nbVirtualFinerLevels="3" youngModulus="100" poissonRatio="0.35" method="large" density="2" updateStiffnessMatrix="false" printLog="0" useMass="false" totalMass="1" drawSize=".5" />
        <BoxConstraint box="-100 -11 -30   30 -9 30" drawSize="0.75"/>
        <Node name="Collinonunif">
            <MeshObjLoader name="loader" filename="mesh/grape_out.obj"/>
            <Mesh src="@loader"/>
            <MechanicalObject src="@loader"/>
            <BarycentricMapping/>
            <Node name="f2">
                <ConstantForceField points="340" forces="1000 8000 0" arrowSizeCoef=".001" />
            </Node>
            <Node name="Visu2">
                <OglModel name="VisualEyes" fileMesh="mesh/grape_out.obj" normals="0" color="0.1 .8 .3 .5" />
                <IdentityMapping input="@.." output="@VisualEyes" />
            </Node>
        </Node>
        <Node name="Visu1">
            <OglModel name="VisualBody" fileMesh="mesh/grape_in.obj" normals="0" color="0 0 .6 1" />
            <BarycentricMapping input="@.." output="@VisualBody" />
        </Node>
    </Node>
</Node>
