<?xml version="1.0" ?>
<Node name="root" dt="0.02">
    <RequiredPlugin name="SofaOpenglVisual"/>
    <DefaultPipeline depth="6" verbose="0" draw="0" />
    <BruteForceDetection name="N2" />
    <NewProximityIntersection name="Proximity" alarmDistance="0.3" contactDistance="0.2" />
    <DefaultContactManager name="Response" response="default" />
    <DefaultCollisionGroupManager name="Group" />
    <Node name="ChainRigid">
        <Node name="TorusFixed">
            <MeshObjLoader name="loader" filename="mesh/torus2_for_collision.obj" />
            <Mesh src="@loader" />
            <MechanicalObject src="@loader" />
            <TriangleCollisionModel contactStiffness="1000" simulated="0" moving="0" />
            <OglModel name="Visual" fileMesh="mesh/torus2.obj" color="gray" texturename="textures/brushed_metal.bmp" />
        </Node>
        <Node name="TorusRigid">
            <EulerImplicitSolver  rayleighStiffness="0.1" rayleighMass="0.1" />
            <CGLinearSolver iterations="25" threshold="0.000000000001" tolerance="0.000001" />
            <MechanicalObject template="Rigid" dx="2.5" />
            <UniformMass filename="BehaviorModels/torus.rigid" />
            <Node name="Visu">
                <OglModel name="Visual" fileMesh="mesh/torus.obj" color="gray" texturename="textures/brushed_metal.bmp" />
                <RigidMapping input="@.." output="@Visual" />
            </Node>
            <Node name="Surf2">
                <MeshObjLoader name="loader" filename="mesh/torus_for_collision.obj" />
                <Mesh src="@loader" />
                <MechanicalObject src="@loader" />
                <TriangleCollisionModel />
                <RigidMapping />
            </Node>
        </Node>
        <Node name="TorusRigid">
            <EulerImplicitSolver />
            <CGLinearSolver iterations="25" threshold="0.000000000001" tolerance="0.000001" />
            <MechanicalObject template="Rigid" dx="5" />
            <UniformMass />
            <Node name="Visu">
                <OglModel name="Visual" fileMesh="mesh/torus2.obj" color="gray" texturename="textures/brushed_metal.bmp" />
                <RigidMapping input="@.." output="@Visual" />
            </Node>
            <Node name="Surf2">
                <MeshObjLoader name="loader" filename="mesh/torus2_for_collision.obj" />
                <Mesh src="@loader" />
                <MechanicalObject src="@loader" />
                <TriangleCollisionModel />
                <RigidMapping />
            </Node>
        </Node>
        <Node name="TorusRigid">
            <EulerImplicitSolver />
            <CGLinearSolver iterations="25" threshold="0.000000000001" tolerance="0.000001" />
            <MechanicalObject template="Rigid" dx="7.5" />
            <UniformMass />
            <Node name="Visu">
                <OglModel name="Visual" fileMesh="mesh/torus.obj" color="gray" texturename="textures/brushed_metal.bmp" />
                <RigidMapping input="@.." output="@Visual" />
            </Node>
            <Node name="Surf2">
                <MeshObjLoader name="loader" filename="mesh/torus_for_collision.obj" />
                <Mesh src="@loader" />
                <MechanicalObject src="@loader" />
                <TriangleCollisionModel />
                <RigidMapping />
            </Node>
        </Node>
        <Node name="TorusRigid">
            <EulerImplicitSolver />
            <CGLinearSolver iterations="25" threshold="0.000000000001" tolerance="0.000001" />
            <MechanicalObject template="Rigid" dx="10" />
            <UniformMass />
            <Node name="Visu">
                <OglModel name="Visual" fileMesh="mesh/torus2.obj" color="gray" texturename="textures/brushed_metal.bmp" />
                <RigidMapping input="@.." output="@Visual" />
            </Node>
            <Node name="Surf2">
                <MeshObjLoader name="loader" filename="mesh/torus2_for_collision.obj" />
                <Mesh src="@loader" />
                <MechanicalObject src="@loader" />
                <TriangleCollisionModel />
                <RigidMapping />
            </Node>
        </Node>
    </Node>
</Node>
