<Node 	name="root" gravity="0 -9.81 0" dt="0.01" time="0" animate="0" showVisualModels="0" showBehaviorModels="1" showCollisionModels="1" showBoundingCollisionModels="0" showMappings="0" showMechanicalMappings="0" showForceFields="1" showInteractionForceFields="0" showWireFrame="0" showNormals="0" multiThreadSimulation="0"  >
	<BruteForceDetection name="default0" />
	<DefaultContactManager name="default1" />
	<DefaultPipeline name="default2" />
	<MinProximityIntersection name="default3" />
	<Node 	name="default4" gravity="0 -9.81 0"  >
		<EulerImplicitSolver name="cg_odesolver"  printLog="0" />
		<CGLinearSolver template="GraphScattered" name="linear solver"  iterations="25"  tolerance="1e-09"  threshold="1e-09" />
		<MechanicalObject template="Rigid" name="DOFs"  restScale="1"  position="0 0 0 0 0 0 1 1 0 0 0 0 0 1 3 0 0 0 0 0 1 5 0 0 0 0 0 1 7 0 0 0 0 0 1"  velocity="0 0 0 0 0 0 0 0 0 0 0 0 0 0 0 0 0 0 0 0 0 0 0 0 0 0 0 0 0 0" />
		<UniformMass template="Rigid" name="mass"  mass="1 1 [1 0 0,0 1 0,0 0 1]" />
		<FixedConstraint template="Rigid" name="fixOrigin"  indices="0" />
		<Node 	name="default5" gravity="0 -9.81 0"  >
			<MechanicalObject template="Rigid" name="attaches"  restScale="1"  position="0 0 0 0.707914 0 0 0.707914 -1 0 0 0.707914 0 0 0.707914 1 0 0 0.707914 0 0 0.707914 -1 0 0 0.707914 0 0 0.707914 1 0 0 0.707914 0 0 0.707914 -1 0 0 0.707914 0 0 0.707914 1 0 0 0.707914 0 0 0.707914 -1 0 0 0.707914 0 0 0.707914 1 0 0 0.707914 0 0 0.707914"  velocity="0 0 0 0 0 0 0 0 0 0 0 0 0 0 0 0 0 0 0 0 0 0 0 0 0 0 0 0 0 0 0 0 0 0 0 0 0 0 0 0 0 0 0 0 0 0 0 0 0 0 0 0 0 0" />
			<RigidRigidMapping template="MechanicalMapping&lt;Rigid,Rigid&gt;" name="default6"  repartition="1 2 2 2 2" />
			<JointSpringForceField template="Rigid" name="joint springs"  spring="BEGIN_SPRING  0 1  FREE_AXIS 0 0 0 0 1 0  KS_T 0 30000  KS_R 0 200000  KD 1  R_LIM_X -0.8 0.8  R_LIM_Y -1.57 1.57  R_LIM_Z 0 0  END_SPRING
 BEGIN_SPRING  2 3  FREE_AXIS 0 0 0 0 1 0  KS_T 0 30000  KS_R 0 200000  KD 1  R_LIM_X -0.8 0.8  R_LIM_Y -1.57 1.57  R_LIM_Z 0 0  END_SPRING
 BEGIN_SPRING  4 5  FREE_AXIS 0 0 0 0 1 0  KS_T 0 30000  KS_R 0 200000  KD 1  R_LIM_X -0.8 0.8  R_LIM_Y -1.57 1.57  R_LIM_Z 0 0  END_SPRING
 BEGIN_SPRING  6 7  FREE_AXIS 0 0 0 0 1 0  KS_T 0 30000  KS_R 0 200000  KD 1  R_LIM_X -0.8 0.8  R_LIM_Y -1.57 1.57  R_LIM_Z 0 0  END_SPRING
" />
		</Node>
		<Node 	name="default7" gravity="0 -9.81 0"  >
			<MechanicalObject template="Vec3d" name="default8"  restScale="1"  position="0 -0.5 -0.5 0 0.5 -0.5 0 0.5 0.5 0 -0.5 0.5 2 -0.5 -0.5 2 0.5 -0.5 2 0.5 0.5 2 -0.5 0.5 2 -0.5 -0.5 2 0.5 -0.5 2 0.5 0.5 2 -0.5 0.5 4 -0.5 -0.5 4 0.5 -0.5 4 0.5 0.5 4 -0.5 0.5 4 -0.5 -0.5 4 0.5 -0.5 4 0.5 0.5 4 -0.5 0.5 6 -0.5 -0.5 6 0.5 -0.5 6 0.5 0.5 6 -0.5 0.5 6 -0.5 -0.5 6 0.5 -0.5 6 0.5 0.5 6 -0.5 0.5 8 -0.5 -0.5 8 0.5 -0.5 8 0.5 0.5 8 -0.5 0.5"  velocity="0 0 0 0 0 0 0 0 0 0 0 0 0 0 0 0 0 0 0 0 0 0 0 0 0 0 0 0 0 0 0 0 0 0 0 0 0 0 0 0 0 0 0 0 0 0 0 0 0 0 0 0 0 0 0 0 0 0 0 0 0 0 0 0 0 0 0 0 0 0 0 0 0 0 0 0 0 0 0 0 0 0 0 0 0 0 0 0 0 0 0 0 0 0 0 0" />
			<MeshTopology name="default9"  edges="0 1  1 2  2 3  3 0  1 5  5 4  4 0  5 6  6 7  7 4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"  triangles="3 1 0  3 2 1  3 6 2  3 7 6  7 5 6  7 4 5  4 1 5  4 0 1  5 1 2  2 6 5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" />
			<TTriangleModel template="Vec3d" name="default10" />
			<LineModel name="default11" />
			<SkinningMapping template="MechanicalMapping&lt;Rigid,Vec3d&gt;" name="default12"  computeJ="1"  computeAllMatrices="0"  repartition="0 1 2 3 0 1 2 3 0 1 2 3 0 1 2 3 1 2 0 3 1 2 0 3 1 2 0 3 1 2 0 3 1 2 0 3 1 2 0 3 1 2 0 3 1 2 0 3 2 3 1 4 2 3 1 4 2 3 1 4 2 3 1 4 2 3 1 4 2 3 1 4 2 3 1 4 2 3 1 4 3 4 2 1 3 4 2 1 3 4 2 1 3 4 2 1 3 4 2 1 3 4 2 1 3 4 2 1 3 4 2 1 4 3 2 1 4 3 2 1 4 3 2 1 4 3 2 1"  nbRefs="5"  interpolationType="1" />
		</Node>
		<Node 	name="Visu" gravity="0 -9.81 0"  >
			<OglModel template="ExtVec3f" name="Visual"  position="0 -0.5 -0.5 0 0.5 -0.5 0 0.5 0.5 0 -0.5 0.5 2 -0.5 -0.5 2 0.5 -0.5 2 0.5 0.5 2 -0.5 0.5 2 -0.5 -0.5 2 0.5 -0.5 2 0.5 0.5 2 -0.5 0.5 4 -0.5 -0.5 4 0.5 -0.5 4 0.5 0.5 4 -0.5 0.5 4 -0.5 -0.5 4 0.5 -0.5 4 0.5 0.5 4 -0.5 0.5 6 -0.5 -0.5 6 0.5 -0.5 6 0.5 0.5 6 -0.5 0.5 6 -0.5 -0.5 6 0.5 -0.5 6 0.5 0.5 6 -0.5 0.5 8 -0.5 -0.5 8 0.5 -0.5 8 0.5 0.5 8 -0.5 0.5"  triangles="3 1 0  3 2 1  3 6 2  3 7 6  7 5 6  7 4 5  4 1 5  4 0 1  5 1 2  2 6 5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" />
			<SkinningMapping template="Mapping&lt;Rigid,ExtVec3f&gt;" name="default20"  object1="../.."  object2="Visual"  repartition="0 1 2 3 0 1 2 3 0 1 2 3 0 1 2 3 1 2 0 3 1 2 0 3 1 2 0 3 1 2 0 3 1 2 0 3 1 2 0 3 1 2 0 3 1 2 0 3 2 3 1 4 2 3 1 4 2 3 1 4 2 3 1 4 2 3 1 4 2 3 1 4 2 3 1 4 2 3 1 4 3 4 2 1 3 4 2 1 3 4 2 1 3 4 2 1 3 4 2 1 3 4 2 1 3 4 2 1 3 4 2 1 4 3 2 1 4 3 2 1 4 3 2 1 4 3 2 1"  nbRefs="5"  interpolationType="1" />
		</Node>
	</Node>
</Node>
