<Node name="root"  dt="0.02" showBehaviorModels="1" showCollisionModels="0" showMappings="0" showForceFields="1">
	<Object type="CollisionPipeline" verbose="0" />
	<Object type="BruteForceDetection" name="N2" />
	<Object type="CollisionResponse" name="Response" response="default" />
	<Object type="CollisionGroup" name="Group" />


	<Node name="DragonCoarse">
		<Object type="SparseGrid"
			n="6 5 4"
			fileTopology="mesh/dragon.obj"
			/>
		<Object type="EulerImplicit" />
		<Object type="CGLinearSolver" iterations="100" />
		<Object type="MechanicalObject" />
		<Object type="UniformMass" mass="0.5"/>
		<Object type="MeshSpringForceField" name="Springs" stiffness="500" damping="10" />
		<Node name="Visu">
			<Object type="OglModel" name="Visual" fileMesh="mesh/dragon.obj" color="yellow" />
			<Object type="BarycentricMapping" object1="../.." object2="Visual" />
		</Node>
		<Node name="Surf">
			<Object type="Sphere" filename="mesh/dragon.sph" />
			<MechanicalObject/>
			<Object type="BarycentricMapping"  />
		</Node>
	</Node>


	<Node name="DragonMiddle">
		<Object type="SparseGrid"
			n="12 9 6"
			fileTopology="mesh/dragon.obj"
		/>
		<Object type="EulerImplicit" />
		<Object type="CGLinearSolver" iterations="100" />
		<Object type="MechanicalObject" dz="15"/>
		<Object type="UniformMass" mass="0.5"/>
		<Object type="MeshSpringForceField" name="Springs" stiffness="500" damping="10" />
		<Node name="Visu">
			<Object type="OglModel" name="Visual" fileMesh="mesh/dragon.obj" color="yellow" />
			<Object type="BarycentricMapping" object1="../.." object2="Visual" />
		</Node>
		<Node name="Surf">
			<Object type="Sphere" filename="mesh/dragon.sph"/>
			<MechanicalObject/>
			<Object type="BarycentricMapping"  />
		</Node>
	</Node>


	<Node name="DragonFine">
		<Object type="SparseGrid"
			n="25 20 9"
			fileTopology="mesh/dragon.obj"
			/>
		<Object type="EulerImplicit" />
		<Object type="CGLinearSolver" iterations="100" />
		<Object type="MechanicalObject" dz="30"/>
		<Object type="UniformMass" mass="0.5"/>
		<Object type="MeshSpringForceField" name="Springs" stiffness="500" damping="10" />
		<Node name="Visu">
			<Object type="OglModel" name="Visual" fileMesh="mesh/dragon.obj" color="yellow" />
			<Object type="BarycentricMapping" object1="../.." object2="Visual" />
		</Node>
		<Node name="Surf">
			<Object type="Sphere" filename="mesh/dragon.sph" />
			<MechanicalObject/>
			<Object type="BarycentricMapping"  />
		</Node>
	</Node>


</Node>
