<Node name="root" dt="0.01">
    <RequiredPlugin name="SofaOpenglVisual"/>
    <OglModel name="VisualModel" fileMesh="mesh/liver-smooth.obj" color="red" />
    <OglGrid name="grid"/>
    <OglLineAxis size="@grid.size"/>
</Node>
