<?xml version="1.0"?>
<Node name="root" dt="0.01">
    <RequiredPlugin name="SofaOpenglVisual"/>

    <OglModel name="VisualModel" fileMesh="mesh/snake_body.obj" translation="30 0 0" useNormals="0"/>

    <MeshObjLoader name="loader" filename="mesh/snake_body.obj" translation="0 0 0"/>
    <OglModel name="VisualModel2"  src="@loader" color="red"/>

</Node>
