<Node name="root" dt="0.01">
    <RequiredPlugin name="SofaOpenglVisual"/>
    <OglModel name="VisualModel" fileMesh="mesh/liver-smooth.obj" color="red" />
    <!-- <OglSceneFrame style="0"/> -->
    <OglSceneFrame style="1"/>
    <!-- <OglSceneFrame style="2"/> -->
</Node>
