<Node name="CollisionNode">
  <MeshLoader name="loader" filename="file"/>
  <Mesh src="@loader"/>
  <MechanicalObject src="@loader" />
  <Triangle contactStiffness="200"/>
  <LineCollisionModel     contactStiffness="@[-1].contactStiffness"/>
  <Point    contactStiffness="@[-1].contactStiffness" />
  <BarycentricMapping />
</Node>
