  <Node name="Obstacle">
    <MeshLoader filename="file"/>
    <Mesh/>
    <MechanicalObject   translation="0 0 0" rotation="0 0 0" scale3d="1.0 1.0 1.0"/>
    <Triangle moving="0" simulated="0" contactStiffness="10" contactFriction="0.01"/>
    <Line moving="0" simulated="0" contactStiffness="10" contactFriction="0.01"/>
    <Point moving="0" simulated="0"  contactStiffness="10" contactFriction="0.01"/>
    <OglModel color="0.500 0.500 0.500" filename="file" name="Visual" translation="0 0 0" rotation="0 0 0" scale3d="1.0 1.0 1.0"/>
  </Node>
