<Node name="FEM" processor="0">
	<EulerImplicitSolver rayleighStiffness="0.01" />
	<ParallelCGLinearSolver iterations="25" threshold="0.00000001"  />

	<SparseGrid name="sparse" n="6 6 6" filename="file"/>
	<MechanicalObject dx="0" dy="0" dz="0" rx="0" ry="0" rz="0" scale="1.0" />
	<UniformMass totalmass="5" />
	<HexahedronFEMForceField name="FEM" youngModulus="5000" poissonRatio="0.3"  method="polar"/>
	<Node name="VisualNode" tags="Visual">
		<OglModel name="Visual" filename="file" color="red" />
		<BarycentricMapping object1="../.." object2="Visual" />
	</Node>
	<Node name="CollisionNode">
	  <MeshLoader name="collisionLoader"  filename="file"/>
		<Mesh />
		<MechanicalObject  />
		<Triangle />
		<BarycentricMapping />
	</Node>
</Node>
