<Node name="FEM" processor="0">
	<ParallelCGImplicitSolver rayleighStiffness="0.01"  iterations="25" threshold="0.00000001"  />

	<SparseGrid name="sparse" n="6 6 6" filename="file"/>
	<MechanicalObject dx="0" dy="0" dz="0" rx="0" ry="0" rz="0" scale="1.0" template="CudaVec3f"/>
	<UniformMass totalmass="5" />
	<HexahedronFEMForceField name="FEM" youngModulus="5000" poissonRatio="0.3"  method="polar"/>

	<Node name="VisualNode">
         	<MeshLoader name="VisualMesh"  filename="file" />
                <Mesh />
                <MappedObject name="Mapped" template="CudaVec3f" />
		<CudaVisualModel computeNormals="true"   template="CudaVec3f"   name="Visual"   diffuse="0.8 0.8 0.8 1.0"    />
		<BarycentricMapping   object1="../.." object2="Mapped" />
	</Node>

	<Node name="CollisionNode">
	        <SparseGrid name="sparse" n="6 6 6" filename="file"/>
		<MechanicalObject   />
		<SphereModel />
		<BarycentricMapping />
	</Node>
</Node>
