<Node name="TorusFFD" processor="0">
  <ParallelCGImplicitSolver iterations="25" threshold="0.000000000001" tolerance="0.000001" rayleighStiffness="0.1" rayleighMass="0" />
	<RegularGrid
			nx="6" ny="2" nz="5"
			xmin="-2.5" xmax="2.5"
			ymin="-0.5" ymax="0.5"
			zmin="-2" zmax="2"
		/>
	<MechanicalObject dx="0" dy="0" dz="0" rx="0" ry="0" rz="0" scale="1.0" />
	<UniformMass totalmass="5" />
	<RegularGridSpringForceField name="Springs" stiffness="200" damping="2" />
	<Node name="Visu">
		<OglModel name="Visual" fileMesh="mesh/torus.obj" color="yellow"  dx="0" dy="0" dz="0" scale="1.0"/>
		<BarycentricMapping object1="../.." object2="Visual" />
	</Node>
	<Node name="Surf2">
    <MeshLoader name="collisionLoader" filename="mesh/torus_for_collision.obj"/>
		<Mesh/>
		<MechanicalObject dx="0" dy="0" dz="0" scale="1.0"/>
		<Triangle />
		<Line />
		<Point />
		<BarycentricMapping />
	</Node>
</Node>
