<!-- Collision Response Stress Test -->
<Node name="root" dt="0.005">
    <RequiredPlugin name="SofaOpenglVisual"/>
    <VisualStyle displayFlags="showForceFields" />
    <DefaultPipeline verbose="0" />
    <BruteForceBroadPhase/>
    <BVHNarrowPhase/>
    <DefaultContactManager name="Response" response="PenalityContactForceField" />
    <DiscreteIntersection />
    <MeshGmshLoader name="meshLoader" filename="mesh/smCube27.msh" />
    <Node name="M1">
        <EulerImplicitSolver  rayleighStiffness="0.1" rayleighMass="0.1" />
        <CGLinearSolver iterations="100" tolerance="1e-5" threshold="1e-5"/>
        <MechanicalObject src="@../meshLoader" dx="0" dy="-10.5" dz="0" />
        <DiagonalMass filename="BehaviorModels/smCube27.xs3" />
        <StiffSpringForceField name="Springs" filename="BehaviorModels/smCube27.xs3" />
        <Node name="Visu">
            <OglModel name="Visual" filename="mesh/smCube27.obj" color="yellow" />
            <IdentityMapping input="@.." output="@Visual" />
        </Node>
        <MeshGmshLoader filename="mesh/smCube27.msh" name="loader" />
        <MeshTopology src="@loader" />
        <Node name="Surf">
            <SphereLoader filename="mesh/smCube27b.sph" />
            <MechanicalObject position="@[-1].position" dx="0" dy="-10.5" dz="0" />
            <SphereCollisionModel listRadius="@[-2].listRadius" />
            <BarycentricMapping />
        </Node>
    </Node>
    <Node name="M2">
        <EulerImplicitSolver />
        <CGLinearSolver iterations="100" tolerance="1e-5" threshold="1e-5"/>
        <MechanicalObject template="Rigid3d" dx="4" dy="0" dz="0" />
        <UniformMass filename="BehaviorModels/rigid.xs3" />
        <Node name="Points">
            <MechanicalObject template="Vec3d" src="@../../meshLoader" />
            <RigidMapping />
        </Node>
        <Node name="Surf">
            <SphereLoader filename="mesh/smCube27b.sph" />
            <MechanicalObject position="@[-1].position" />
            <SphereCollisionModel listRadius="@[-2].listRadius" />
            <RigidMapping />
        </Node>
        <Node name="Visu">
            <OglModel name="Visual" filename="mesh/smCube27.obj" />
            <RigidMapping input="@.." output="@Visual" />
        </Node>
    </Node>
    <Node name="M3">
        <EulerImplicitSolver />
        <CGLinearSolver iterations="100" tolerance="1e-5" threshold="1e-5"/>
        <MechanicalObject src="@../meshLoader" dx="0" dy="10.5" dz="-4" />
        <DiagonalMass filename="BehaviorModels/smCube27.xs3" />
        <StiffSpringForceField name="Springs" filename="BehaviorModels/smCube27.xs3" />
        <Node name="Visu">
            <OglModel name="Visual" filename="mesh/smCube27.obj" color="red" />
            <IdentityMapping input="@.." output="@Visual" />
        </Node>
        <MeshGmshLoader filename="mesh/smCube27.msh" name="loader" />
        <MeshTopology src="@loader" />
        <Node name="Surf">
            <SphereLoader filename="mesh/smCube27b.sph" />
            <MechanicalObject position="@[-1].position" dx="0" dy="10.5" dz="-4" />
            <SphereCollisionModel listRadius="@[-2].listRadius" />
            <BarycentricMapping />
        </Node>
    </Node>
    <Node name="M4">
        <EulerImplicitSolver />
        <CGLinearSolver iterations="100" tolerance="1e-5" threshold="1e-5"/>
        <MechanicalObject template="Rigid3d" dx="0" dy="21" dz="0" />
        <UniformMass filename="BehaviorModels/rigid.xs3" />
        <Node name="Points">
            <MechanicalObject template="Vec3d" src="@../../meshLoader"/>
            <RigidMapping />
            <Node name="Visu">
                <OglModel name="Visual" filename="mesh/smCube27.obj" />
                <IdentityMapping input="@.." output="@Visual" />
            </Node>
        </Node>
        <Node name="Surf">
            <SphereLoader filename="mesh/smCube27.sph" />
            <MechanicalObject position="@[-1].position" />
            <SphereCollisionModel listRadius="@[-2].listRadius" />
            <RigidMapping />
        </Node>
    </Node>
    <Node name="M5">
        <EulerImplicitSolver />
        <CGLinearSolver iterations="100" tolerance="1e-5" threshold="1e-5"/>
        <MechanicalObject src="@../meshLoader" dx="-4" dy="31.5" dz="-4" />
        <DiagonalMass filename="BehaviorModels/smCube27.xs3" />
        <StiffSpringForceField name="Springs" filename="BehaviorModels/smCube27.xs3" />
        <Node name="Visu">
            <OglModel name="Visual" filename="mesh/smCube27.obj" color="cyan" />
            <IdentityMapping input="@.." output="@Visual" />
        </Node>
        <MeshGmshLoader filename="mesh/smCube27.msh" name="loader" />
        <MeshTopology src="@loader" />
        <Node name="Surf">
            <SphereLoader filename="mesh/smCube27b.sph" />
            <MechanicalObject position="@[-1].position" dx="-4" dy="31.5" dz="-4" />
            <SphereCollisionModel listRadius="@[-2].listRadius" />
            <BarycentricMapping />
        </Node>
    </Node>
    <Node name="M6">
        <EulerImplicitSolver />
        <CGLinearSolver iterations="100" tolerance="1e-5" threshold="1e-5"/>
        <MechanicalObject template="Rigid3d" dx="0" dy="45" dz="0" />
        <UniformMass filename="BehaviorModels/rigid.xs3" />
        <Node name="Points">
            <MechanicalObject template="Vec3d" src="@../../meshLoader" />
            <RigidMapping />
        </Node>
        <Node name="Visu">
            <OglModel name="Visual" filename="mesh/dragon.obj" color="gray" />
            <RigidMapping input="@.." output="@Visual" />
        </Node>
        <Node name="Surf">
            <SphereLoader filename="mesh/dragon.sph" />
            <MechanicalObject position="@[-1].position" />
            <SphereCollisionModel listRadius="@[-2].listRadius" />
            <RigidMapping />
        </Node>
    </Node>
    <SphereLoader filename="mesh/floor.sph" />
    <MechanicalObject position="@[-1].position" dy="-20" />
    <SphereCollisionModel listRadius="@[-2].listRadius" simulated="0" moving="0" />
    <Node>
        <OglModel name="FloorV" filename="mesh/floor.obj" texturename="textures/floor.bmp" dy="-20" />
    </Node>
</Node>
