<!-- This is the simplest example possible:
   + the first line defines global parameters for the scene which are attached to the root node of the scene
   + then we load the OBJ model of the tooth and display it (using a white color)
-->
<Node name="root" dt="0.01">
    <RequiredPlugin name="SofaOpenglVisual"/>
    <BackgroundSetting color="0.901960784 0.925490196 0.964705882" />
    <Node name="Head">
        <OglModel name="HeadVisualModel" fileMesh="data/mesh/head.obj" texturename="Tutorials/StepByStep/Dentistry_Haptics/data/pics/head_baseTexBaked.png" />
        <Node name="Tongue">
            <OglModel name="TongueVisualModel" fileMesh="data/mesh/tongue.obj" texturename="Tutorials/StepByStep/Dentistry_Haptics/data/pics/tongue_color.png" />
        </Node>
        <Node name="Teeth">
            <OglModel name="TeethVisualModel" fileMesh="data/mesh/teeth.obj" texturename="Tutorials/StepByStep/Dentistry_Haptics/data/pics/teeth_color.png" />
        </Node>
    </Node>
</Node>
