<Node name="root" dt="0.01">
    <RequiredPlugin name="SofaOpenglVisual"/>
	<BackgroundSetting color="0 0.16862745098 0.21176470588"/>
    <OglModel name="VisualModel" fileMesh="mesh/liver-smooth.obj" color="red"/>
    <OglGrid size="10" name="grid"/>
    <OglLineAxis size="@grid.size"/>
    <OglSceneFrame/>
</Node>
