<?xml version="1.0" ?>
<Node name="root" gravity="0 -9.81 0" dt="0.01">
    <VisualStyle displayFlags="showBehavior" />
    <DefaultPipeline name="DefaultCollisionPipeline" verbose="0" draw="0" depth="6" />
    <BruteForceDetection name="Detection" />
    <MinProximityIntersection name="Proximity" alarmDistance="3" contactDistance="2" />
    <DefaultContactManager name="Response" response="default" />
    <Node name="Tetrahedrons Mesh">
        <MeshGmshLoader name="loader" filename="mesh/cylinder.msh" />
        <TetrahedronSetTopologyContainer name="Container" src="@loader" />
        <MechanicalObject name="Volume" />
        <TetrahedronSetGeometryAlgorithms  name="GeomAlgo" drawTetrahedra="1" drawColorTetrahedra="1.0 1.0 0.3" />
    </Node>
</Node>
