<Node 	name="root" gravity="0 -9.81 0" dt="0.01" showBehaviorModels="1" showForceFields="1" showInteractionForceFields="1"  >
	<DefaultPipeline name="DefaultCollisionPipeline"  verbose="0"  draw="0"  depth="6" />
	<BruteForceDetection name="Detection" />
	<MinProximityIntersection name="Proximity"  alarmDistance="3"  contactDistance="2" />
	<DefaultContactManager name="Response"  response="default" />

  <Node name="Tetrahedrons Mesh">
    <MeshGmshLoader name="loader" filename="mesh/cylinder.msh" />
    <MechanicalObject template="Vec3d" name="Volume" src="@loader"/>

    <EulerImplicitSolver name="cg_odesolver" printLog="0"/>
    <CGLinearSolver template="GraphScattered" name="linear solver" iterations="25" tolerance="1e-09" threshold="1e-09"/>

    <TetrahedronSetTopologyContainer name="Container" filename="mesh/cylinder.msh" tetrahedra="@loader.tetrahedra"/>
    <TetrahedronSetTopologyModifier name="Modifier"/>
    <TetrahedronSetTopologyAlgorithms template="Vec3d" name="TopoAlgo"/>
    <TetrahedronSetGeometryAlgorithms template="Vec3d" name="GeomAlgo" drawTetrahedra="0" drawColorTetrahedra="1.0 1.0 0.3"/>

    <TetrahedralCorotationalFEMForceField template="Vec3d" name="FEM" method="large" poissonRatio="0.3" youngModulus="60" assembling="0"/>
    <DiagonalMass template="Vec3d" name="default11" massDensity="2"/>
    <FixedPlaneConstraint template="Vec3d" name="default12" direction="0 0 1" dmin="-0.1" dmax="0.1"/>
    <FixedConstraint template="Vec3d" name="default13" indices="0"/>

    <Node name="Triangles Mesh">
      <TriangleSetTopologyContainer name="Container"/>
      <TriangleSetTopologyModifier name="Modifier"/>
      <TriangleSetTopologyAlgorithms template="Vec3d" name="TopoAlgo"/>
      <TriangleSetGeometryAlgorithms template="Vec3d" name="GeomAlgo"/>
      <Tetra2TriangleTopologicalMapping name="Mapping" object1="../../Container" object2="Container"/>

      <Node name="Visu">
	<OglModel template="ExtVec3f" name="Visual" material="Default Diffuse 1 0 0 1 1 Ambient 1 0 0 0.2 1 Specular 0 0 0 1 1 Emissive 0 0 0 1 1 Shininess 0 45"/>
	<IdentityMapping template="Mapping&lt;Vec3d,ExtVec3f&gt;" name="default17" object1="../../../Volume" object2="Visual"/>
      </Node>
    </Node>
  </Node>
</Node>
