<Node name="root" gravity="0 -9.81 0" dt="0.01">
    <RequiredPlugin name="SofaOpenglVisual"/>
    <VisualStyle displayFlags="showBehavior" />
    <MeshVTKLoader name="vtkloader" filename="mesh/Armadillo_Tetra_4406.vtu" />
    <OglModel name="bunny" src="@vtkloader" />
</Node>
